# OpenSim document version 40000
AnalyzeTool Rajagopal_scaled_TorsFem_l_Prox30Dist0Deg:
  replace_force_set: false
  results_directory: .
  output_precision: 8
  initial_time: 0
  final_time: Inf
  solve_for_equilibrium_for_auxiliary_states: false
  maximum_number_of_integrator_steps: 20000
  maximum_integrator_step_size: 1
  minimum_integrator_step_size: 1e-8
  integrator_error_tolerance: 1e-5
  coordinates_file: C:/Git/MSKmodelling/Projects/MatlabStaticOptimization/TestData/BodyKinematics/../results_ik.sto
  lowpass_cutoff_frequency_for_coordinates: -1
  AnalysisSet Analyses:
    BodyKinematics: start_time=0 end_time=Inf step_interval=1 in_degrees=true bodies=all
        express_results_in_body_local_frame=false
  ControllerSet Controllers:
    ControlSetController: controls_file=C:\Git\MSKmodelling\Projects\MatlabStaticOptimization\TestData\BodyKinematics\results_states.sto
