# OpenSim document version 40000
AnalyzeTool Ante30_scaled_opt_N10.osim:
  model_file: ../StudyData/Ante30_scaled_opt_N10_2times2392Fmax.osim
  replace_force_set: false
  force_set_files: ../../../../../Documents/OpenSim/4.2/Models/Gait2392_Simbody/gait2392_CMC_Actuators.xml
  results_directory: GUI_Output
  output_precision: 8
  initial_time: 2.46
  final_time: 2.575
  solve_for_equilibrium_for_auxiliary_states: false
  maximum_number_of_integrator_steps: 20000
  maximum_integrator_step_size: 1
  minimum_integrator_step_size: 1e-8
  integrator_error_tolerance: 1e-5
  external_loads_file: GRFnewOnlyLeft.xml
  coordinates_file: IK.mot
  lowpass_cutoff_frequency_for_coordinates: 6
  AnalysisSet Analyses:
    StaticOptimization: start_time=2.46 end_time=2.575 step_interval=1 in_degrees=true use_model_force_set=true
        activation_exponent=2 use_muscle_physiology=true optimizer_convergence_criterion=0.0001
        optimizer_max_iterations=100
