# OpenSim document version 40000
MarkerSet:
  Marker STRN: torso (0.102408 0.241335 0)
  Marker C7: torso (-0.0688974 0.433993 0)
  Marker T10: torso (-0.09718657 0.2022742 -0.00212008)
  Marker CLAV: torso (0.0578759 0.365168 0)
  Marker RBAK: torso (-0.0971866 0.402274 0.10212)
  Marker RASI: pelvis (0.02 0.01 0.128)
  Marker LASI: pelvis (0.02 0.01 -0.128)
  Marker SACR: pelvis (-0.153149 0.0708936 0)
  Marker LT1: femur_l (0.03 -0.2 -0.07)
  Marker LT3: femur_l (0.13 -0.27 -0.07)
  Marker LT2: femur_l (-0.01 -0.29 -0.06)
  Marker LKNE: femur_l (0 -0.425 -0.05)
  Marker LKNM: femur_l (0 -0.425 0.05)
  Marker LS1: tibia_l (0.005 -0.13 -0.05)
  Marker LS3: tibia_l (0.01 -0.23 -0.07)
  Marker LS2: tibia_l (-0.11 -0.16 -0.04)
  Marker LANK: tibia_l (-0.005 -0.41 -0.053)
  Marker LANM: tibia_l (0.006 -0.4 0.038)
  Marker LHEE: calcn_l (-0.02 0.02 0)
  Marker LM5D: calcn_l (0.16 0.015 -0.046)
  Marker LTOE: calcn_l (0.185 0.02 -0.005)
  Marker LHJC: femur_l (0 0 0)
  Marker LKJC: femur_l (-0.00449986 -0.395 0)
  Marker LAJC: talus_l (0 0 0)
  Marker RT1: femur_r (0.0297315 -0.2 0.07)
  Marker RT3: femur_r (0.13 -0.26 0.06)
  Marker RT2: femur_r (-0.01 -0.29 0.09)
  Marker RKNE: femur_r (0 -0.425 0.05)
  Marker RKNM: femur_r (0 -0.425 -0.05)
  Marker RS1: tibia_r (0.005 -0.13 0.05)
  Marker RS3: tibia_r (0.01 -0.22 0.06)
  Marker RS2: tibia_r (-0.11 -0.16 0.03)
  Marker RANK: tibia_r (-0.005 -0.41 0.053)
  Marker RANM: tibia_r (0.006 -0.4 -0.038)
  Marker RHEE: calcn_r (-0.02 0.02 0)
  Marker RM5D: calcn_r (0.16 0.015 0.046)
  Marker RTOE: calcn_r (0.185 0.02 0.005)
  Marker RHJC: femur_r (0 0 0)
  Marker RKJC: femur_r (-0.00449986 -0.395 0)
  Marker RAJC: talus_r (0 0 0)
