# OpenSim document version 40000
InverseKinematicsTool:
  results_directory: ./
  constraint_weight: Inf
  accuracy: 1e-5
  time_range: 0 2.76
  output_motion_file: C:\Users\Willi\Documents\UniDataLokal\SimulationOutput\TDs_KAM\TD10_L_AVA40_NSA_138_R_AVA35_NSA_135_scaled_final\gait_07\Output\IK_reducedTorsoMarkers\IK.mot
  report_errors: true
  marker_file: C:\Users\Willi\Documents\UniDataLokal\DEMAND\VICON_DATA_SCHMELZ\TD10\2022_01_05\gait_07\marker_experimental.trc
  report_marker_locations: true
  IKTaskSet:
    IKMarkerTask STRN: apply=false weight=1
    IKMarkerTask C7: apply=false weight=1
    IKMarkerTask T10: apply=false weight=1
    IKMarkerTask CLAV: apply=false weight=1
    IKMarkerTask RBAK: apply=false weight=1
    IKMarkerTask RASI: apply=true weight=1
    IKMarkerTask LASI: apply=true weight=1
    IKMarkerTask SACR: apply=true weight=1
    IKMarkerTask RS1: apply=true weight=1
    IKMarkerTask RS2: apply=true weight=1
    IKMarkerTask RS3: apply=true weight=1
    IKMarkerTask RKNE: apply=false weight=1
    IKMarkerTask RKNM: apply=false weight=1
    IKMarkerTask RPAT: apply=false weight=1
    IKMarkerTask RT1: apply=true weight=1
    IKMarkerTask RT2: apply=true weight=1
    IKMarkerTask RT3: apply=true weight=1
    IKMarkerTask RANK: apply=false weight=1
    IKMarkerTask RANM: apply=false weight=1
    IKMarkerTask RHEE: apply=true weight=1
    IKMarkerTask RM5D: apply=true weight=1
    IKMarkerTask RTOE: apply=true weight=1
    IKMarkerTask LS1: apply=true weight=1
    IKMarkerTask LS2: apply=true weight=1
    IKMarkerTask LS3: apply=true weight=1
    IKMarkerTask LKNE: apply=false weight=1
    IKMarkerTask LKNM: apply=false weight=1
    IKMarkerTask LPAT: apply=false weight=1
    IKMarkerTask LT1: apply=true weight=1
    IKMarkerTask LT2: apply=true weight=1
    IKMarkerTask LT3: apply=true weight=1
    IKMarkerTask LANK: apply=false weight=1
    IKMarkerTask LANM: apply=false weight=1
    IKMarkerTask LHEE: apply=true weight=1
    IKMarkerTask LM5D: apply=true weight=1
    IKMarkerTask LTOE: apply=true weight=1
    IKMarkerTask RTHI: apply=false weight=1
    IKMarkerTask LTHI: apply=false weight=1
    IKMarkerTask RTIB: apply=false weight=1
    IKMarkerTask LTIB: apply=false weight=1
