# OpenSim document version 30000
# Copyright (c) 2013, Stanford University
# Permission is hereby granted, free of charge, to any person obtaining a copy of this software and associated documentation files (the "Software"), to deal in the Software without restriction, including without limitation the rights to use, copy, modify, merge, publish, distribute, sublicense, and/or sell copies of the Software, and to permit persons to whom the Software is furnished to do so, subject to the following conditions:
# The above copyright notice and this permission notice shall be included in all copies or substantial portions of the Software.
# THE SOFTWARE IS PROVIDED "AS IS", WITHOUT WARRANTY OF ANY KIND, EXPRESS OR IMPLIED, INCLUDING BUT NOT LIMITED TO THE WARRANTIES OF MERCHANTABILITY, FITNESS FOR A PARTICULAR PURPOSE AND NONINFRINGEMENT. IN NO EVENT SHALL THE AUTHORS OR COPYRIGHT HOLDERS BE LIABLE FOR ANY CLAIM, DAMAGES OR OTHER LIABILITY, WHETHER IN AN ACTION OF CONTRACT, TORT OR OTHERWISE, ARISING FROM, OUT OF OR IN CONNECTION WITH THE SOFTWARE OR THE USE OR OTHER DEALINGS IN THE
# SOFTWARE.
# Please cite: Hamner, S.R., Delp, S.L. (2013) Muscle contributions to fore-aft and vertical body mass center accelerations
# over a range of running speeds. Journal of Biomechanics, vol 46, pp 780-787.
CMCTool subject01_Run_20002_cycle1:
  model_file: ..\..\rra_multipleSteps\RRA_Results_v191_Run_20002\subject01_RRA_adjusted_Run_20002_cycle1_v191_Tendon_040_Vmax_15_Passive_10_2X.osim
  replace_force_set: false
  force_set_files: ../gait2392_CMC_Actuators.xml
  results_directory: CMC_Results_v240_Run_20002_cycle1
  output_precision: 8
  initial_time: 0.199
  final_time: 0.962
  solve_for_equilibrium_for_auxiliary_states: true
  maximum_number_of_integrator_steps: 30000
  maximum_integrator_step_size: 1
  minimum_integrator_step_size: 1e-8
  integrator_error_tolerance: 1e-5
  external_loads_file: subject01_Run_20002_cycle1_GRF_v240.xml
  desired_kinematics_file: ..\..\rra_multipleSteps\RRA_Results_v191_Run_20002\RRA_Results_v191_Run_20002_cycle1\subject01_Run_20002_cycle1_Kinematics_q.sto
  task_set_file: ../gait2392_CMC_Tasks.xml
  constraints_file: subject01_Run_20002_cycle1_ControlConstraints.xml
  lowpass_cutoff_frequency: -1
  cmc_time_window: 0.01
  use_curvature_filter: false
  use_fast_optimization_target: true
  optimizer_algorithm: cfsqp
  numerical_derivative_step_size: 0.0001
  optimization_convergence_tolerance: 1e-4
  optimizer_max_iterations: 2000
  optimizer_print_level: 0
  use_verbose_printing: false
  AnalysisSet Analyses:
    Kinematics: start_time=0 end_time=100 step_interval=10 in_degrees=true coordinates=all
    Actuation: start_time=0 end_time=1 step_interval=10 in_degrees=true
