# OpenSim document version 30000
MarkerSet:
  Marker C7: torso (-0.0790852 0.418245 0.00461227) fixed=true
  Marker STRN1: torso (0.045925 0.378717 0.00130273) fixed=true
  Marker STRN2: torso (0.100993 0.22403 0.00205336) fixed=true
  Marker LAC: torso (0.00989536 0.459567 -0.163512) fixed=true
  Marker RAC: torso (0.0102019 0.459154 0.163527) fixed=true
  Marker LASIS: pelvis (0.0160623 0.00474141 -0.127934) fixed=true
  Marker RASIS: pelvis (0.0179681 0.00531358 0.124872) fixed=true
  Marker LPSIS: pelvis (-0.165172 0.0327378 -0.0401012) fixed=true
  Marker RPSIS: pelvis (-0.161995 0.032074 0.0447454) fixed=true
  Marker LHJC: femur_l (0 0 0) fixed=true
  Marker LTH1: femur_l (0.0560265 -0.201871 -0.0813812)
  Marker LTH2: femur_l (-0.00310864 -0.224322 -0.0907975)
  Marker LTH3: femur_l (0.0092183 -0.298741 -0.0735628)
  Marker LTH4: femur_l (0.067182 -0.265805 -0.0708425)
  Marker LLK: femur_l (0.00768771 -0.412228 -0.0496075) fixed=true
  Marker LMK: femur_l (0.0104949 -0.414355 0.0450923) fixed=true
  Marker LKJC: tibia_l (0.0135999 -0.0174793 -0.0023) fixed=true
  Marker LTTUB: tibia_l (0.0420365 -0.0723504 -0.0173362)
  Marker LSK1: tibia_l (0.0194471 -0.138549 -0.0403557)
  Marker LSK2: tibia_l (-0.00917595 -0.171305 -0.0671725)
  Marker LSK3: tibia_l (-0.0218725 -0.21702 -0.0460136) fixed=true
  Marker LSK4: tibia_l (0.0127618 -0.250249 -0.0352466)
  Marker LINFRUB: tibia_l (0.0420366 -0.321981 -0.00374191)
  Marker LLA: tibia_l (-0.0123917 -0.412482 -0.0507096) fixed=true
  Marker LMA: tibia_l (0.00417661 -0.398507 0.0419251) fixed=true
  Marker LAJC: talus_l (0 0 0) fixed=true
  Marker LHEE: calcn_l (-0.0162897 0.0205983 0.0062448) fixed=true
  Marker LD1MT: calcn_l (0.195343 0.0145223 0.0259749) fixed=true
  Marker LTOE: calcn_l (0.180875 0.0119499 -0.01474) fixed=true
  Marker LD5MT: calcn_l (0.147401 0.0139381 -0.0532457) fixed=true
  Marker RHJC: femur_r (0 0 0) fixed=true
  Marker RTH1: femur_r (-0.00217439 -0.23796 0.0973714)
  Marker RTH2: femur_r (0.0433688 -0.262265 0.0743759)
  Marker RTH3: femur_r (0.0428684 -0.317497 0.0702356)
  Marker RTH4: femur_r (-0.00920438 -0.312465 0.0819912)
  Marker RLK: femur_r (0.00768771 -0.412228 0.0496075) fixed=true
  Marker RMK: femur_r (0.0104949 -0.414355 -0.0450923) fixed=true
  Marker RKJC: tibia_r (0.0135999 -0.0174793 0.0023) fixed=true
  Marker RTTUB: tibia_r (0.0420365 -0.0723504 -0.0173362)
  Marker RSK1: tibia_r (0.0145738 -0.116702 0.0342994)
  Marker RSK2: tibia_r (-0.00442413 -0.153865 0.061493)
  Marker RSK3: tibia_r (-0.00756154 -0.202184 0.0642429)
  Marker RSK4: tibia_r (0.017588 -0.234476 0.032119)
  Marker RINFRUB: tibia_r (0.0420366 -0.321981 -0.00374191)
  Marker RLA: tibia_r (-0.0199221 -0.409756 0.0490872) fixed=true
  Marker RMA: tibia_r (0.00679511 -0.392269 -0.0415713) fixed=true
  Marker RAJC: talus_r (0 0 0) fixed=true
  Marker RHEE: calcn_r (-0.0188557 0.0208207 -0.00493198) fixed=true
  Marker RD1MT: calcn_r (0.204227 0.0170974 -0.0272822) fixed=true
  Marker RTOE: calcn_r (0.179882 0.0166037 0.0100905) fixed=true
  Marker RD5MT: calcn_r (0.146245 0.0156268 0.0564557) fixed=true
