# OpenSim document version 30000
ExternalLoads Ex2:
  datafile: E:\3-FatigueFAIS\OpenSimTrial\ElaboratedData\034_2\pre\dynamicElaborations\Run_baselineB1\Run_baselineB1.mot
  lowpass_cutoff_frequency_for_load_kinematics: 6
  ExternalForce Left: applied_to_body=calcn_l force_expressed_in_body=ground point_expressed_in_body=ground
      force_identifier=ground_force1_v point_identifier=ground_force1_p torque_identifier=ground_torque1_
  ExternalForce Left: applied_to_body=calcn_l force_expressed_in_body=ground point_expressed_in_body=ground
      force_identifier=ground_force2_v point_identifier=ground_force2_p torque_identifier=ground_torque2_
  ExternalForce Left: applied_to_body=calcn_l force_expressed_in_body=ground point_expressed_in_body=ground
      force_identifier=ground_force3_v point_identifier=ground_force3_p torque_identifier=ground_torque3_
  ExternalForce Left: applied_to_body=calcn_l force_expressed_in_body=ground point_expressed_in_body=ground
      force_identifier=ground_force4_v point_identifier=ground_force4_p torque_identifier=ground_torque4_
