# OpenSim document version 30000
InverseKinematicsTool:
  results_directory: ./
  constraint_weight: Inf
  accuracy: 1e-6
  time_range: 1 2
  report_errors: true
  report_marker_locations: false
  IKTaskSet:
    IKMarkerTask C71: apply=true weight=1
    IKMarkerTask C72: apply=true weight=1
    IKMarkerTask C73: apply=true weight=1
    IKMarkerTask SAC1: apply=true weight=5
    IKMarkerTask SAC2: apply=true weight=5
    IKMarkerTask SAC3: apply=true weight=5
    IKMarkerTask RASI: apply=false weight=10
    IKMarkerTask LASI: apply=false weight=10
    IKMarkerTask RPSI: apply=false weight=10
    IKMarkerTask LPSI: apply=false weight=10
    IKMarkerTask RTH1: apply=true weight=1
    IKMarkerTask RTH2: apply=true weight=1
    IKMarkerTask RTH3: apply=true weight=1
    IKMarkerTask RTH4: apply=true weight=1
    IKMarkerTask RTB1: apply=true weight=5
    IKMarkerTask RTB2: apply=true weight=5
    IKMarkerTask RTB3: apply=true weight=5
    IKMarkerTask RTB4: apply=true weight=5
    IKMarkerTask RCAL: apply=true weight=5
    IKMarkerTask RMTP1: apply=true weight=5
    IKMarkerTask RMTP5: apply=true weight=5
    IKMarkerTask LTH1: apply=true weight=1
    IKMarkerTask LTH2: apply=true weight=1
    IKMarkerTask LTH3: apply=true weight=1
    IKMarkerTask LTH4: apply=true weight=1
    IKMarkerTask LTB1: apply=true weight=5
    IKMarkerTask LTB2: apply=true weight=5
    IKMarkerTask LTB3: apply=true weight=5
    IKMarkerTask LTB4: apply=true weight=5
    IKMarkerTask LCAL: apply=true weight=10
    IKMarkerTask LMT1: apply=true weight=10
    IKMarkerTask LMT5: apply=true weight=10
