# OpenSim document version 30000
InverseKinematicsTool:
  results_directory: ./
  constraint_weight: Inf
  accuracy: 1e-5
  time_range: 1 2
  report_errors: true
  report_marker_locations: false
  IKTaskSet:
    IKMarkerTask T10: apply=true weight=1
    IKMarkerTask C7: apply=true weight=1
    IKMarkerTask CLAV: apply=true weight=1
    IKMarkerTask RASI: apply=true weight=5
    IKMarkerTask LASI: apply=true weight=5
    IKMarkerTask RPSI: apply=true weight=5
    IKMarkerTask LPSI: apply=true weight=5
    IKMarkerTask RTH1: apply=true weight=2
    IKMarkerTask RTH2: apply=true weight=2
    IKMarkerTask RTH3: apply=true weight=2
    IKMarkerTask RTB1: apply=true weight=2
    IKMarkerTask RTB2: apply=true weight=2
    IKMarkerTask RTB3: apply=true weight=2
    IKMarkerTask RCAL: apply=true weight=1
    IKMarkerTask RMT1: apply=true weight=1
    IKMarkerTask RMT5: apply=true weight=1
    IKMarkerTask LTH1: apply=true weight=2
    IKMarkerTask LTH2: apply=true weight=2
    IKMarkerTask LTH3: apply=true weight=2
    IKMarkerTask LTB1: apply=true weight=2
    IKMarkerTask LTB2: apply=true weight=2
    IKMarkerTask LTB3: apply=true weight=2
    IKMarkerTask LCAL: apply=true weight=1
    IKMarkerTask LMT1: apply=true weight=1
    IKMarkerTask LMT5: apply=true weight=1
