# OpenSim document version 30000
InverseKinematicsTool 2014_04_03_PC008_BAREFOOT_GAIT0001_1:
  results_directory: .\
  model_file: ..\..\PC008_linearScalled.osim
  constraint_weight: Inf
  accuracy: 1e-6
  marker_file: .\markers.trc
  time_range: [0.72 1.71]
  report_errors: [true]
  output_motion_file: .\IK.mot
  report_marker_locations: [false]
  IKTaskSet:
    IKMarkerTask C7: weight=1 apply=true
    IKMarkerTask STRN1: weight=1 apply=true
    IKMarkerTask STRN2: weight=1 apply=true
    IKMarkerTask LAC: weight=1 apply=true
    IKMarkerTask RAC: weight=1 apply=true
    IKMarkerTask LASIS: weight=50 apply=true
    IKMarkerTask RASIS: weight=50 apply=true
    IKMarkerTask LPSIS: weight=50 apply=true
    IKMarkerTask RPSIS: weight=50 apply=true
    IKMarkerTask LTH1: weight=100 apply=true
    IKMarkerTask LTH2: weight=100 apply=true
    IKMarkerTask LTH3: weight=100 apply=true
    IKMarkerTask LTH4: weight=100 apply=true
    IKMarkerTask LLK: weight=1 apply=true
    IKMarkerTask LSK1: weight=100 apply=true
    IKMarkerTask LSK2: weight=100 apply=true
    IKMarkerTask LSK3: weight=100 apply=true
    IKMarkerTask LLA: weight=1 apply=true
    IKMarkerTask LMA: weight=1 apply=true
    IKMarkerTask LHEE: weight=100 apply=true
    IKMarkerTask LD1MT: weight=100 apply=true
    IKMarkerTask LTOE: weight=10 apply=true
    IKMarkerTask LD5MT: weight=100 apply=true
    IKMarkerTask RTH1: weight=100 apply=true
    IKMarkerTask RTH2: weight=100 apply=true
    IKMarkerTask RTH3: weight=100 apply=true
    IKMarkerTask RTH4: weight=100 apply=true
    IKMarkerTask RLK: weight=1 apply=true
    IKMarkerTask RSK1: weight=100 apply=true
    IKMarkerTask RSK2: weight=100 apply=true
    IKMarkerTask RSK3: weight=100 apply=true
    IKMarkerTask RLA: weight=1 apply=true
    IKMarkerTask RMA: weight=1 apply=true
    IKMarkerTask RHEE: weight=100 apply=true
    IKMarkerTask RD1MT: weight=100 apply=true
    IKMarkerTask RTOE: weight=10 apply=true
    IKMarkerTask RD5MT: weight=100 apply=true
    IKCoordinateTask [values shared by the 11 below unless stated]: apply=[false] weight=0.1 value_type=default_value
        value=0
    IKCoordinateTask hip_flexion_r
    IKCoordinateTask hip_adduction_r
    IKCoordinateTask hip_rotation_r
    IKCoordinateTask knee_angle_r
    IKCoordinateTask ankle_angle_r
    IKCoordinateTask hip_flexion_l
    IKCoordinateTask hip_adduction_l
    IKCoordinateTask hip_rotation_l
    IKCoordinateTask knee_angle_l
    IKCoordinateTask ankle_angle_l
    IKCoordinateTask mtp_angle_l: weight=1
