# OpenSim document version 30000
InverseKinematicsTool:
  constraint_weight: Inf
  accuracy: 1e-5
  time_range: 0 1
  report_errors: true
  report_marker_locations: false
  IKTaskSet:
    IKMarkerTask LFHD: apply=false weight=1
    IKMarkerTask RFHD: apply=false weight=1
    IKMarkerTask LBHD: apply=false weight=1
    IKMarkerTask RBHD: apply=false weight=1
    IKMarkerTask THO1: apply=true weight=0.5
    IKMarkerTask THO2: apply=true weight=0.5
    IKMarkerTask THO3: apply=true weight=0.5
    IKMarkerTask CLAV: apply=true weight=2
    IKMarkerTask T8: apply=true weight=2
    IKMarkerTask LPUA1: apply=true weight=1
    IKMarkerTask LPUA2: apply=true weight=1
    IKMarkerTask LPUA3: apply=true weight=1
    IKMarkerTask LLEP: apply=false weight=1
    IKMarkerTask LMEP: apply=false weight=1
    IKMarkerTask LFA1: apply=true weight=0.5
    IKMarkerTask LFA2: apply=true weight=0.5
    IKMarkerTask LFA3: apply=true weight=0.5
    IKMarkerTask LHNDR: apply=true weight=0.5
    IKMarkerTask LHNDU: apply=true weight=0.5
    IKMarkerTask LCAR: apply=true weight=0.5
    IKMarkerTask RPUA1: apply=true weight=1
    IKMarkerTask RPUA2: apply=true weight=1
    IKMarkerTask RPUA3: apply=true weight=1
    IKMarkerTask RLEP: apply=false weight=1
    IKMarkerTask RMEP: apply=false weight=1
    IKMarkerTask RFA1: apply=true weight=0.5
    IKMarkerTask RFA2: apply=true weight=0.5
    IKMarkerTask RFA3: apply=true weight=0.5
    IKMarkerTask RHNDR: apply=true weight=0.5
    IKMarkerTask RHNDU: apply=true weight=0.5
    IKMarkerTask RCAR: apply=true weight=0.5
    IKMarkerTask LASI: apply=true weight=3
    IKMarkerTask RASI: apply=true weight=3
    IKMarkerTask LPSI: apply=true weight=3
    IKMarkerTask RPSI: apply=true weight=3
    IKMarkerTask LHJC: apply=false weight=1
    IKMarkerTask RHJC: apply=false weight=1
    IKMarkerTask SAC1: apply=false weight=2
    IKMarkerTask SAC2: apply=false weight=2
    IKMarkerTask SAC3: apply=false weight=2
    IKMarkerTask LTH1: apply=true weight=2
    IKMarkerTask LTH2: apply=true weight=2
    IKMarkerTask LTH3: apply=true weight=2
    IKMarkerTask LKJC: apply=false weight=1
    IKMarkerTask LMFC: apply=false weight=1
    IKMarkerTask LLFC: apply=false weight=1
    IKMarkerTask LTB1: apply=true weight=2
    IKMarkerTask LTB2: apply=true weight=2
    IKMarkerTask LTB3: apply=true weight=2
    IKMarkerTask LAJC: apply=false weight=1
    IKMarkerTask LMMAL: apply=false weight=1
    IKMarkerTask LLMAL: apply=false weight=1
    IKMarkerTask LCAL: apply=true weight=1
    IKMarkerTask LMT1: apply=true weight=2
    IKMarkerTask LMT5: apply=true weight=1
    IKMarkerTask RTH1: apply=true weight=2
    IKMarkerTask RTH2: apply=true weight=2
    IKMarkerTask RTH3: apply=true weight=2
    IKMarkerTask RKJC: apply=false weight=1
    IKMarkerTask RMFC: apply=false weight=1
    IKMarkerTask RLFC: apply=false weight=1
    IKMarkerTask RTB1: apply=true weight=2
    IKMarkerTask RTB2: apply=true weight=2
    IKMarkerTask RTB3: apply=true weight=2
    IKMarkerTask RAJC: apply=false weight=1
    IKMarkerTask RMMAL: apply=false weight=1
    IKMarkerTask RLMAL: apply=false weight=1
    IKMarkerTask RCAL: apply=true weight=1
    IKMarkerTask RMT1: apply=true weight=2
    IKMarkerTask RMT5: apply=true weight=1
