# OpenSim document version 30000
InverseKinematicsTool:
  constraint_weight: Inf
  accuracy: 1e-5
  time_range: 1.38333 2.6
  report_errors: true
  report_marker_locations: false
  IKTaskSet:
    IKMarkerTask RA: apply=true weight=1
    IKMarkerTask LA: apply=true weight=1
    IKMarkerTask RASIS: apply=true weight=1
    IKMarkerTask LASIS: apply=true weight=1
    IKMarkerTask L5: apply=true weight=1
    IKMarkerTask RLE: apply=false weight=1
    IKMarkerTask RME: apply=false weight=1
    IKMarkerTask RHF: apply=false weight=1
    IKMarkerTask RLM: apply=false weight=1
    IKMarkerTask RMM: apply=false weight=1
    IKMarkerTask RCA: apply=true weight=1
    IKMarkerTask RVMH: apply=true weight=1
    IKMarkerTask RIIT: apply=true weight=1
    IKMarkerTask LLE: apply=false weight=1
    IKMarkerTask LME: apply=false weight=1
    IKMarkerTask LHF: apply=false weight=1
    IKMarkerTask LLM: apply=false weight=1
    IKMarkerTask LMM: apply=false weight=1
    IKMarkerTask LCA: apply=true weight=1
    IKMarkerTask LVMH: apply=true weight=1
    IKMarkerTask LIMH: apply=true weight=1
    IKMarkerTask LIIT: apply=true weight=1
    IKMarkerTask RPSIS: apply=true weight=1
    IKMarkerTask LPSIS: apply=true weight=1
    IKMarkerTask C7: apply=true weight=1
    IKMarkerTask RIMH: apply=true weight=1
    IKMarkerTask AR2: apply=true weight=1
    IKMarkerTask AL4: apply=true weight=1
    IKMarkerTask AR1: apply=true weight=1
    IKMarkerTask AL1: apply=true weight=1
    IKMarkerTask AR3: apply=true weight=1
    IKMarkerTask AL3: apply=true weight=1
    IKMarkerTask AR4: apply=true weight=1
    IKMarkerTask AL2: apply=true weight=1
    IKMarkerTask CR1: apply=true weight=1
    IKMarkerTask CR3: apply=true weight=1
    IKMarkerTask CR2: apply=true weight=1
    IKMarkerTask CR4: apply=true weight=1
    IKMarkerTask CL1: apply=true weight=1
    IKMarkerTask CL2: apply=true weight=1
    IKMarkerTask CL4: apply=true weight=1
    IKMarkerTask CL3: apply=true weight=1
    IKMarkerTask GR3: apply=true weight=1
    IKMarkerTask GL3: apply=true weight=1
    IKMarkerTask GR1: apply=true weight=1
    IKMarkerTask GL1: apply=true weight=1
    IKMarkerTask GR4: apply=true weight=1
    IKMarkerTask GR2: apply=true weight=1
    IKMarkerTask GL4: apply=true weight=1
    IKMarkerTask GL2: apply=true weight=1
    IKMarkerTask IJ: apply=true weight=1
    IKMarkerTask RHJC: apply=false weight=1
    IKMarkerTask LHJC: apply=false weight=1
    IKMarkerTask RKJC: apply=false weight=1
    IKMarkerTask LKJC: apply=false weight=1
    IKMarkerTask RAJC: apply=false weight=1
    IKMarkerTask LAJC: apply=false weight=1
