# OpenSim document version 30000
MarkerSet:
  Marker FHD: torso (0.0927072 0.597103 -0.00414687) fixed=true
  Marker LBHD: torso (-0.0849905 0.569706 -0.043139)
  Marker RBHD: torso (-0.0794098 0.571023 0.0515235)
  Marker C7: torso (-0.085 0.435 0.00165426) fixed=true
  Marker T10: torso (-0.0943921 0.203142 -0.00142022)
  Marker CLAV: torso (0.0486694 0.369107 0.00046003) fixed=true
  Marker LSHO: torso (-0.00250296 0.422783 -0.149713) fixed=true
  Marker LUUPA: humerus_l (0.00294495 -0.136357 -0.0257785)
  Marker LMUPA: humerus_l (0.0018115 -0.191504 -0.0185006)
  Marker LDUPA: humerus_l (0.0282514 -0.163572 -0.0275973)
  Marker LLEP: humerus_l (0.015 -0.28 -0.04) fixed=true
  Marker LMEP: humerus_l (0.00225005 -0.286 0.046) fixed=true
  Marker LRAD: radius_l (-0.00218555 -0.23256 -0.0449975) fixed=true
  Marker LUL: ulna_l (-0.0294326 -0.241593 -0.00596175) fixed=true
  Marker LRFIN: hand_l (-0.012988 -0.075111 -0.008988) fixed=true
  Marker RSHO: torso (-0.00137866 0.420924 0.148274) fixed=true
  Marker RUPA1: humerus_r (-0.00113392 -0.15151 0.0191497)
  Marker RMUPA: humerus_r (0 -0.2 0.02)
  Marker RDUPA: humerus_r (0.0197389 -0.17739 0.0185128)
  Marker RLEP: humerus_r (0.015 -0.28 0.04) fixed=true
  Marker RMEP: humerus_r (0.00225 -0.286 -0.046) fixed=true
  Marker RRAD: radius_r (-0.00371418 -0.230706 0.0469393) fixed=true
  Marker RUL: ulna_r (-0.0287888 -0.242776 0.00788761) fixed=true
  Marker RUFIN: hand_r (-0.0100686 -0.0818203 0.0122632) fixed=true
  Marker LASI: pelvis (0.0154487 0.010716 -0.128922) fixed=true
  Marker RASI: pelvis (0.0172817 0.00931 0.129081) fixed=true
  Marker USACR: pelvis (-0.146279 0.0249 0) fixed=true
  Marker LSACR: pelvis (-0.155757 0 -0.0202784) fixed=true
  Marker RSACR: pelvis (-0.151824 0 0.0202784) fixed=true
  Marker LHJC: femur_l (0 0 0) fixed=true
  Marker LTHI1: femur_l (0.0365854 -0.230779 -0.0516748)
  Marker LTHI2: femur_l (0.0320454 -0.315382 -0.0408489)
  Marker LTHI3: femur_l (0.0383327 -0.275807 -0.0381844)
  Marker LTHI4: femur_l (0.0533341 -0.273209 -0.0115174)
  Marker LLFC: femur_l (-3.16575e-5 -0.408872 -0.0471372) fixed=true
  Marker LMFC: femur_l (0 -0.404 0.05) fixed=true
  Marker LKJC: tibia_l (0.001731 -0.002389 0.008452) fixed=true
  Marker LTIB1: tibia_l (0.0368692 -0.149095 0.00633472)
  Marker LTIB2: tibia_l (0.0378625 -0.20293 0.00607872)
  Marker LTIB3: tibia_l (0.0333672 -0.204224 -0.0217876)
  Marker LTIB4: tibia_l (0.0263853 -0.248053 0.00708025)
  Marker LLMAL: tibia_l (-0.0115346 -0.383953 -0.0472023) fixed=true
  Marker LMMAL: tibia_l (0.00388774 -0.370945 0.0390254) fixed=true
  Marker LAJC: talus_l (0 0 0) fixed=true
  Marker LHEE: calcn_l (-0.0164675 0.0208231 0.00631294) fixed=true
  Marker LMT1: calcn_l (0.197475 0.0146808 0.0262583) fixed=true
  Marker LMT2: calcn_l (0.182849 0.0120803 -0.0149008) fixed=true
  Marker LMT5: calcn_l (0.149009 0.0140902 -0.0538267) fixed=true
  Marker RHJC: pelvis (-0.056276 -0.07849 0.07726) fixed=true
  Marker RTHI: femur_r (0.0271379 -0.201617 0.0491218)
  Marker RTHI2: femur_r (0.0507586 -0.234574 0.039248)
  Marker RTHI3: femur_r (0.0687571 -0.231384 0.0102367)
  Marker RTHI4: femur_r (0.0315926 -0.273869 0.0416775)
  Marker RLFC: femur_r (0 -0.404 0.05) fixed=true
  Marker RMFC: femur_r (0 -0.404 -0.05) fixed=true
  Marker RKJC: tibia_r (0.001731 -0.002389 -0.008452) fixed=true
  Marker RTIB1: tibia_r (0.042085 -0.184868 -0.00589999)
  Marker RTIB2: tibia_r (0.0369643 -0.230107 -0.00391699)
  Marker RTIB3: tibia_r (0.0253163 -0.234812 0.026079)
  Marker RTIB4: tibia_r (0.0387123 -0.289217 -0.00443473)
  Marker RLMAL: tibia_r (-0.0189532 -0.389828 0.0466999) fixed=true
  Marker RMMAL: tibia_r (0.00646463 -0.373191 -0.0395495) fixed=true
  Marker RAJC: talus_r (0 0 0) fixed=true
  Marker RHEE: calcn_r (-0.0181589 0.0200512 -0.00474971) fixed=true
  Marker RMT1: calcn_r (0.19668 0.0164655 -0.026274) fixed=true
  Marker RMT2: calcn_r (0.173234 0.0159901 0.00971763) fixed=true
  Marker RMT5: calcn_r (0.14084 0.0150493 0.0543693) fixed=true
  Marker RHHE_floor: calcn_r (-0.0181589 0 -0.00474971)
  Marker MidASIS: pelvis (0.0172817 0.00931 0)
  Marker MidHJC: pelvis (-0.056276 -0.07849 0)
  Marker MidSACR: pelvis (-0.151949 0 0)
  Marker MidPelvis: pelvis (-0.056276 0 0)
