# OpenSim document version 30000
AnalyzeTool:
  replace_force_set: false
  output_precision: 8
  initial_time: 1
  final_time: 2
  solve_for_equilibrium_for_auxiliary_states: false
  maximum_number_of_integrator_steps: 20000
  maximum_integrator_step_size: 1
  minimum_integrator_step_size: 1e-8
  integrator_error_tolerance: 1e-5
  coordinates_file: ./
  lowpass_cutoff_frequency_for_coordinates: -1
  AnalysisSet Analyses:
    MuscleAnalysis: start_time=1 end_time=2 step_interval=1 in_degrees=true
        muscle_list=(bifemlh_r bifemsh_r grac_r lat_gas_r med_gas_r rect_fem_r sar_r semimem_r semiten_r tfl_r vas_int_r vas_lat_r vas_med_r bifemlh_l bifemsh_l grac_l lat_gas_l med_gas_l rect_fem_l sar_l semimem_l semiten_l tfl_l vas_int_l vas_lat_l vas_med_l)
        moment_arm_coordinate_list=all compute_moments=true
