# OpenSim document version 30000
AnalyzeTool:
  replace_force_set: false
  output_precision: 8
  initial_time: 1
  final_time: 2
  solve_for_equilibrium_for_auxiliary_states: false
  maximum_number_of_integrator_steps: 20000
  maximum_integrator_step_size: 1
  minimum_integrator_step_size: 1e-8
  integrator_error_tolerance: 1e-5
  coordinates_file: ./
  lowpass_cutoff_frequency_for_coordinates: 6
  AnalysisSet Analyses:
    MuscleAnalysis: start_time=1 end_time=2 step_interval=1 in_degrees=true
        muscle_list=(bflh_r bfsh_r gaslat_r gasmed_r grac_r recfem_r sart_r semimem_r semiten_r soleus_r tfl_r tibant_r vasint_r vaslat_r vasmed_r bflh_l bfsh_l gaslat_l gasmed_l grac_l recfem_l sart_l semimem_l semiten_l soleus_l tfl_l tibant_l vasint_l vaslat_l vasmed_l)
        moment_arm_coordinate_list=all compute_moments=true
