# OpenSim document version 30000
CMC_TaskSet LowerLimb_RRA:
  CMC_Joint [values shared by the 29 below unless stated]: wrt_body=-1 express_body=-1 active=(true false false) kp=100
      kv=20 weight=100
  CMC_Joint pelvis_tz: weight=200 coordinate=pelvis_tz
  CMC_Joint pelvis_tx: weight=200 coordinate=pelvis_tx
  CMC_Joint pelvis_ty: weight=200 coordinate=pelvis_ty
  CMC_Joint pelvis_tilt: weight=200 coordinate=pelvis_tilt
  CMC_Joint pelvis_list: weight=200 coordinate=pelvis_list
  CMC_Joint pelvis_rotation: weight=200 coordinate=pelvis_rotation
  CMC_Joint hip_flexion_r: coordinate=hip_flexion_r
  CMC_Joint hip_adduction_r: coordinate=hip_adduction_r
  CMC_Joint hip_rotation_r: coordinate=hip_rotation_r
  CMC_Joint knee_angle_r: coordinate=knee_angle_r
  CMC_Joint ankle_angle_r: coordinate=ankle_angle_r
  CMC_Joint hip_flexion_l: coordinate=hip_flexion_l
  CMC_Joint hip_adduction_l: coordinate=hip_adduction_l
  CMC_Joint hip_rotation_l: coordinate=hip_rotation_l
  CMC_Joint knee_angle_l: coordinate=knee_angle_l
  CMC_Joint ankle_angle_l: coordinate=ankle_angle_l
  CMC_Joint lumbar_extension: coordinate=lumbar_extension
  CMC_Joint lumbar_bending: coordinate=lumbar_bending
  CMC_Joint lumbar_rotation: coordinate=lumbar_rotation
  CMC_Joint arm_flex_r: coordinate=arm_flex_r
  CMC_Joint arm_add_r: coordinate=arm_add_r
  CMC_Joint arm_rot_r: coordinate=arm_rot_r
  CMC_Joint elbow_flex_r: coordinate=elbow_flex_r
  CMC_Joint pro_sup_r: coordinate=pro_sup_r
  CMC_Joint arm_flex_l: coordinate=arm_flex_l
  CMC_Joint arm_add_l: coordinate=arm_add_l
  CMC_Joint arm_rot_l: coordinate=arm_rot_l
  CMC_Joint elbow_flex_l: coordinate=elbow_flex_l
  CMC_Joint pro_sup_l: coordinate=pro_sup_l
