# OpenSim document version 30000
Model Subject15_FBM_Scaled_Pose_OptMusc_opt_N10.osim:
  length_units: meters
  force_units: N
  gravity: 0 -9.80665 0
  credits:
    Arnold, E.M., Hamner, S.R., Ward, S.R., Lieber, R. L., and Delp, S.L.
  BodySet:
    Body ground: mass=0 mass_center=(0 0 0) inertia_xx=0 inertia_yy=0 inertia_zz=0
    Body pelvis: mass=13.67837 mass_center=(-0.167441 0 0.1) inertia_xx=0.1226478 inertia_yy=0.1226478
        inertia_zz=0.0611918 meshes=(r_pelvis.vtp l_pelvis.vtp sacrum.vtp)
      CustomJoint ground_pelvis: parent_body=ground location_in_parent=(0 0 0) location=(0 0 0)
        Coordinate pelvis_tilt: motion_type=rotational default_value=0 range=(-1.570796 1.570796) clamped=true
        Coordinate pelvis_list: motion_type=rotational default_value=0 range=(-1.570796 1.570796) clamped=true
        Coordinate pelvis_rotation: motion_type=rotational default_value=0 range=(-1.570796 1.570796) clamped=true
        Coordinate pelvis_tx: motion_type=translational default_value=0 range=(-5 5) clamped=true
        Coordinate pelvis_ty: motion_type=translational default_value=-1.052027e-8 range=(-1 2) clamped=true
        Coordinate pelvis_tz: motion_type=translational default_value=0 range=(-3 3) clamped=true
        SpatialTransform:
          TransformAxis rotation1: coordinates=pelvis_tilt axis=(0 0 1) LinearFunction(coefficients=1 0)
          TransformAxis rotation2: coordinates=pelvis_list axis=(1 0 0) LinearFunction(coefficients=1 0)
          TransformAxis rotation3: coordinates=pelvis_rotation axis=(0 1 0) LinearFunction(coefficients=1 0)
          TransformAxis translation1: coordinates=pelvis_tx axis=(1 0 0) LinearFunction(coefficients=1 0)
          TransformAxis translation2: coordinates=pelvis_ty axis=(0 1 0) LinearFunction(coefficients=1 0)
          TransformAxis translation3: coordinates=pelvis_tz axis=(0 0 1) LinearFunction(coefficients=1 0)
      WrapCylinder Gmax1_at_pelvis_r: xyz_body_rotation=(-0.6 0.45 0) translation=(-0.0734511 -0.0944371 0.0631933)
          quadrant=-x radius=0.03891378 length=0.1500085
      WrapCylinder Gmax2_at_pelvis_r: xyz_body_rotation=(-0.75 0.39 0) translation=(-0.0763128 -0.0791745 0.070445)
          quadrant=all radius=0.03906768 length=0.09923282
      WrapCylinder Gmax3_at_pelvis_r: xyz_body_rotation=(-0.1 0 0) translation=(-0.0791745 -0.0839441 0.070445)
          quadrant=all radius=0.03817346 length=0.103517
      WrapCylinder Gmax1_at_pelvis_l: xyz_body_rotation=(0.6 -0.45 0) translation=(-0.0734511 -0.0944371 -0.0631933)
          quadrant=-x radius=0.03891378 length=0.1500085
      WrapCylinder Gmax2_at_pelvis_l: xyz_body_rotation=(0.75 -0.39 0) translation=(-0.0763128 -0.0791745 -0.070445)
          quadrant=all radius=0.03906768 length=0.09923282
      WrapCylinder Gmax3_at_pelvis_l: xyz_body_rotation=(0.1 0 0) translation=(-0.0791745 -0.0839441 -0.070445)
          quadrant=all radius=0.03817346 length=0.103517
      WrapCylinder PS_at_brim_r: xyz_body_rotation=(-0.25 -0.27 0.1) translation=(-0.0705893 -0.0572346 0.0679587)
          quadrant=-y radius=0.04796854 length=0.102582
      WrapCylinder PS_at_brim_l: xyz_body_rotation=(0.25 0.27 0.1) translation=(-0.0705893 -0.0572346 -0.0679587)
          quadrant=-y radius=0.04796854 length=0.102582
      WrapCylinder IL_at_brim_r: xyz_body_rotation=(-0.32 -0.24 0.9) translation=(-0.0677276 -0.0620042 0.0783183)
          quadrant=-y radius=0.05271969 length=0.1024079
      WrapCylinder IL_at_brim_l: xyz_body_rotation=(0.32 0.24 0.9) translation=(-0.0677276 -0.0620042 -0.0783183)
          quadrant=-y radius=0.05271969 length=0.1024079
    Body femur_r: mass=10.80309 mass_center=(0 -0.17423 0) inertia_xx=0.1634939 inertia_yy=0.04310212
        inertia_zz=0.1634939 meshes=r_femur.vtp
      CustomJoint hip_r: parent_body=pelvis location_in_parent=(-0.05368225 -0.07487241 0.08003796) location=(0 0 0)
        Coordinate hip_flexion_r: motion_type=rotational default_value=-1.053969e-9 range=(-0.7853982 1.570796)
            clamped=true
        Coordinate hip_adduction_r: motion_type=rotational default_value=-7.844959e-9 range=(-1.047198 0.6981317)
            clamped=true
        Coordinate hip_rotation_r: motion_type=rotational default_value=0 range=(-0.5235988 1.047198) clamped=true
        SpatialTransform: axes_held_at_zero=(translation1 translation2 translation3)
          TransformAxis rotation1: coordinates=hip_flexion_r axis=(0 0 1) LinearFunction(coefficients=1 0)
          TransformAxis rotation2: coordinates=hip_adduction_r axis=(1 0 0) LinearFunction(coefficients=1 0)
          TransformAxis rotation3: coordinates=hip_rotation_r axis=(0 1 0) LinearFunction(coefficients=1 0)
      WrapCylinder Gastroc_at_condyles_r: translation=(0.00512441 -0.420202 0) quadrant=all radius=0.02562204
          length=0.1031616
      WrapCylinder KnExt_at_fem_r: xyz_body_rotation=(-0.0623366 0.0507601 0)
          translation=(0.00367756 -0.412753 0.00215722) quadrant=all radius=0.02562259 length=0.1031573
      WrapCylinder AB_at_femshaft_r: xyz_body_rotation=(1.66157 0.186644 0) translation=(0.0150078 -0.115397 0.0241037)
          quadrant=all radius=0.01696567 length=0.07174547
      WrapCylinder AL_at_femshaft_r: xyz_body_rotation=(1.77711 0.136489 0) translation=(0.0314974 -0.237679 0.0155915)
          quadrant=all radius=0.02066502 length=0.102516
      WrapCylinder AMprox_at_femshaft_r: xyz_body_rotation=(1.61126 0.18656 0)
          translation=(0.00531195 -0.0747085 0.0262061) quadrant=all radius=0.02169594 length=0.07174247
      WrapCylinder AMmid_at_femshaft_r: xyz_body_rotation=(1.61139 0.13656 0) translation=(0.0235851 -0.16471 0.021235)
          quadrant=all radius=0.02200441 length=0.1229871
      WrapCylinder AMdist_at_femshaft_r: xyz_body_rotation=(1.71188 0.186636 0)
          translation=(0.0323929 -0.267224 0.00966067) quadrant=all radius=0.02241443 length=0.2050021
      WrapCylinder AMisch_at_condyles_r: xyz_body_rotation=(1.71115 -0.463363 0)
          translation=(-0.0232147 -0.386207 -0.0032541) quadrant=all radius=0.04112785 length=0.245997
      WrapCylinder PECT_at_femshaft_r: xyz_body_rotation=(1.81295 0.276344 0)
          translation=(0.00623715 -0.0866055 0.0314029) quadrant=all radius=0.01542105 length=0.05126206
    Body origin_tibia_r: mass=4.306068 mass_center=(0 -0.209292 0) inertia_xx=0.07286893 inertia_yy=0.006059517
        inertia_zz=0.07286893 meshes=(r_tibia.vtp r_fibula.vtp)
      CustomJoint knee_r: parent_body=femur_r location_in_parent=(-0.008291293 -0.4181107 -0.002836944)
          orientation_in_parent=(-1.641568 1.446181 1.570796) location=(-0.009068439 -0.003962539 -0.001354908)
          orientation=(-1.641568 1.446181 1.570796)
        Coordinate knee_angle_r: motion_type=rotational default_value=0.0001269535 range=(-0.1745329 2.094395)
            clamped=true
        SpatialTransform: axes_held_at_zero=translation3
          TransformAxis rotation1: coordinates=knee_angle_r axis=(1 0 0) LinearFunction(coefficients=1 0)
          TransformAxis rotation2: coordinates=knee_angle_r axis=(0 0 1)
            SimmSpline: x=(0 0.174533 0.349066 0.523599 0.698132 0.872665 1.0472 1.22173 1.39626 1.5708 1.74533 1.91986 2.0944)
                y=(0 0.0126809 0.0226969 0.0296054 0.0332049 0.0335354 0.0308779 0.0257548 0.0189295 0.011407 0.00443314 -0.00050475 -0.0016782)
          TransformAxis rotation3: coordinates=knee_angle_r axis=(0 1 0)
            SimmSpline: x=(0 0.174533 0.349066 0.523599 0.698132 0.872665 1.0472 1.22173 1.39626 1.5708 1.74533 1.91986 2.0944)
                y=(0 0.059461 0.109399 0.150618 0.18392 0.210107 0.229983 0.24435 0.254012 0.25977 0.262428 0.262788 0.261654)
          TransformAxis translation1: coordinates=knee_angle_r axis=(0 1 0)
            MultiplierFunction: scale=1.024882
              SimmSpline: x=(0 0.174533 0.349066 0.523599 0.698132 0.872665 1.0472 1.22173 1.39626 1.5708 1.74533 1.91986 2.0944)
                  y=(0 0.000479 0.000835 0.001086 0.001251 0.001346 0.001391 0.001403 0.0014 0.0014 0.001421 0.001481 0.001599)
          TransformAxis translation2: coordinates=knee_angle_r axis=(0 0 1)
            MultiplierFunction: scale=1.031616
              SimmSpline: x=(0 0.174533 0.349066 0.523599 0.698132 0.872665 1.0472 1.22173 1.39626 1.5708 1.74533 1.91986 2.0944)
                  y=(0 0.000988 0.001899 0.002734 0.003492 0.004173 0.004777 0.005305 0.005756 0.00613 0.006427 0.006648 0.006792)
      WrapCylinder GasLat_at_shank_r: xyz_body_rotation=(2.96723 -0.279725 -1.47812)
          translation=(-0.00829546 -0.0829546 -0.00301143) quadrant=-y radius=0.06111201 length=0.09364056
      WrapCylinder GasMed_at_shank_r: xyz_body_rotation=(2.96723 0.0279725 -1.47812)
          translation=(-0.00829546 -0.0829546 -0.00301143) quadrant=-y radius=0.06149464 length=0.0919694
      WrapCylinder GR_at_condyles_r: xyz_body_rotation=(0 -0.4 0) translation=(-0.00336302 -0.0224202 0) quadrant=all
          radius=0.03983342 length=0.09471226
      WrapCylinder SM_at_condyles_r: xyz_body_rotation=(0 -0.1 0) translation=(-0.00112101 -0.0224202 0) quadrant=all
          radius=0.03942629 length=0.09148677
      WrapCylinder ST_at_condyles_r: xyz_body_rotation=(0 -0.2 0) translation=(-0.00224202 -0.0229807 0) quadrant=all
          radius=0.04748373 length=0.09216774
      WrapCylinder BF_at_gastroc_r: translation=(-0.0650185 -0.0672605 0) quadrant=y radius=0.03363024 length=0.1368834
    Body medialTibia_r: mass=1.161448e-8 mass_center=(0 0 0) inertia_xx=1.161448e-8 inertia_yy=1.161448e-8
        inertia_zz=1.161448e-8 meshes=Cube.vtp
      CustomJoint medialTibia_r: parent_body=origin_tibia_r location_in_parent=(0 -0.0358708 -0.02646731)
          location=(0 -0.0358708 -0.02646731)
        Coordinate medialTibiaPivotPoint_flex_r: motion_type=rotational default_value=0 range=(0 0) clamped=false
            locked=true
        Coordinate medialTibiaPivotPoint_add_r: motion_type=rotational default_value=0 range=(0 0) clamped=false
            locked=true
        Coordinate medialTibiaPivotPoint_int_r: motion_type=rotational default_value=0 range=(0 0) clamped=false
            locked=true
        SpatialTransform: axes_held_at_zero=(translation1 translation2 translation3)
          TransformAxis rotation1: coordinates=medialTibiaPivotPoint_flex_r axis=(0 0 1)
              LinearFunction(coefficients=1 0)
          TransformAxis rotation2: coordinates=medialTibiaPivotPoint_add_r axis=(1 0 0)
              LinearFunction(coefficients=1 0)
          TransformAxis rotation3: coordinates=medialTibiaPivotPoint_int_r axis=(0 1 0)
              LinearFunction(coefficients=1 0)
    Body lateralTibia_r: mass=1.161448e-8 mass_center=(0 0 0) inertia_xx=1.161448e-8 inertia_yy=1.161448e-8
        inertia_zz=1.161448e-8 meshes=Cube.vtp
      CustomJoint lateralTibia_r: parent_body=medialTibia_r location_in_parent=(0 -0.0358708 0.02646731)
          location=(0 -0.0358708 0.02646731)
        Coordinate lateralTibiaPivotPoint_flex_r: motion_type=rotational default_value=0 range=(0 0) clamped=false
            locked=true
        Coordinate lateralTibiaPivotPoint_add_r: motion_type=rotational default_value=0 range=(0 0) clamped=false
            locked=true
        Coordinate lateralTibiaPivotPoint_int_r: motion_type=rotational default_value=0 range=(0 0) clamped=false
            locked=true
        SpatialTransform: axes_held_at_zero=(translation1 translation2 translation3)
          TransformAxis rotation1: coordinates=lateralTibiaPivotPoint_flex_r axis=(0 0 1)
              LinearFunction(coefficients=1 0)
          TransformAxis rotation2: coordinates=lateralTibiaPivotPoint_add_r axis=(1 0 0)
              LinearFunction(coefficients=1 0)
          TransformAxis rotation3: coordinates=lateralTibiaPivotPoint_int_r axis=(0 1 0)
              LinearFunction(coefficients=1 0)
    Body patella_r: mass=0.1001168 mass_center=(0.0018 0.0264 0) inertia_xx=3.333355e-6 inertia_yy=1.522658e-5
        inertia_zz=1.522658e-5 meshes=r_patella.vtp
      CustomJoint patellofemoral_r: parent_body=femur_r location_in_parent=(-0.008291293 -0.4181107 -0.002836944)
          location=(0 0 0)
        Coordinate knee_angle_r_beta: motion_type=rotational default_value=0.0001269535 range=(-99999.9 99999.9)
            clamped=false
        SpatialTransform: axes_held_at_zero=(rotation2 rotation3)
          TransformAxis rotation1: coordinates=knee_angle_r_beta axis=(0 0 1)
            SimmSpline f11: x=(0 0.174533 0.349066 0.523599 0.698132 0.872665 1.0472 1.22173 1.39626 1.5708 1.74533 1.91986 2.0944)
                y=(0.00113686 -0.00629212 -0.105582 -0.253683 -0.414245 -0.579047 -0.747244 -0.91799 -1.09044 -1.26379 -1.43763 -1.61186 -1.78634)
          TransformAxis translation1: coordinates=knee_angle_r_beta axis=(1 0 0)
            MultiplierFunction: scale=1.024882
              SimmSpline f9: x=(0 0.174533 0.349066 0.523599 0.698132 0.872665 1.0472 1.22173 1.39626 1.5708 1.74533 1.91986 2.0944)
                  y=(0.0524 0.0488 0.0437 0.0371 0.0296 0.0216 0.0136 0.0057 -0.0019 -0.0088 -0.0148 -0.0196 -0.0227)
          TransformAxis translation2: coordinates=knee_angle_r_beta axis=(0 1 0)
            MultiplierFunction: scale=1.024882
              SimmSpline f10: x=(0 0.174533 0.349066 0.523599 0.698132 0.872665 1.0472 1.22173 1.39626 1.5708 1.74533 1.91986 2.0944)
                  y=(-0.0108 -0.019 -0.0263 -0.0322 -0.0367 -0.0395 -0.0408 -0.0404 -0.0384 -0.0349 -0.0301 -0.0245 -0.0187)
          TransformAxis translation3: axis=(0 0 1) MultiplierFunction(scale=1.031616, Constant(value=0.00275))
    Body dummyTibia_r: mass=0.001 mass_center=(0 0 0) inertia_xx=1e-8 inertia_yy=1e-8 inertia_zz=1e-8 meshes=Cube.vtp
      CustomJoint dummyTibiofemoral_r: parent_body=lateralTibia_r
          location_in_parent=(-0.00808954 -0.0035348 -0.00148474) orientation_in_parent=(-1.641568 1.446181 1.570796)
          location=(-0.00808954 -0.0035348 -0.00148474) orientation=(-1.641568 1.446181 1.570796)
        Coordinate dummyTibiofemoral_flex_r: motion_type=rotational default_value=0 range=(0 0) clamped=false
            locked=true
        Coordinate dummyTibiofemoral_add_r: motion_type=rotational default_value=0 range=(0 0) clamped=false
            locked=true
        Coordinate dummyTibiofemoral_int_r: motion_type=rotational default_value=0 range=(0 0) clamped=false
            locked=true
        Coordinate dummyTibiofemoral_x_r: motion_type=translational default_value=0 range=(0 0) clamped=false
            locked=true
        Coordinate dummyTibiofemoral_y_r: motion_type=translational default_value=0 range=(0 0) clamped=false
            locked=true
        Coordinate dummyTibiofemoral_z_r: motion_type=translational default_value=0 range=(0 0) clamped=false
            locked=true
        SpatialTransform:
          TransformAxis rotation1: coordinates=dummyTibiofemoral_flex_r axis=(1 0 0) LinearFunction(coefficients=1 0)
          TransformAxis rotation2: coordinates=dummyTibiofemoral_add_r axis=(0 0 1) LinearFunction(coefficients=1 0)
          TransformAxis rotation3: coordinates=dummyTibiofemoral_int_r axis=(0 1 0) LinearFunction(coefficients=1 0)
          TransformAxis translation1: coordinates=dummyTibiofemoral_x_r axis=(1 0 0) LinearFunction(coefficients=1 0)
          TransformAxis translation2: coordinates=dummyTibiofemoral_y_r axis=(0 1 0) LinearFunction(coefficients=1 0)
          TransformAxis translation3: coordinates=dummyTibiofemoral_z_r axis=(0 0 1) LinearFunction(coefficients=1 0)
    Body talus_r: mass=0.1161448 mass_center=(0 0 0) inertia_xx=0.001214729 inertia_yy=0.001214729
        inertia_zz=0.001214729 meshes=r_talus.vtp
      PinJoint ankle_r: parent_body=lateralTibia_r location_in_parent=(-0.01 -0.448404 0)
          orientation_in_parent=(0.1758952 -0.105208 0.01866219) location=(0 0 0)
          orientation=(0.1758952 -0.105208 0.01866219)
        Coordinate ankle_angle_r: motion_type=rotational default_value=-6.861745e-9 range=(-1.308997 0.7853982)
            clamped=true
    Body calcn_r: mass=1.45181 mass_center=(0.102268 0.0306804 0) inertia_xx=0.001700621 inertia_yy=0.004737444
        inertia_zz=0.00498039 meshes=r_foot.vtp
      PinJoint subtalar_r: parent_body=talus_r location_in_parent=(-0.04987612 -0.04290144 0.008099628)
          orientation_in_parent=(-1.768191 0.906223 1.819602) location=(0 0 0)
          orientation=(-1.768191 0.906223 1.819602)
        Coordinate subtalar_angle_r: motion_type=rotational default_value=0 range=(-0.3490659 0.3490659) clamped=true
            locked=true
    Body toes_r: mass=0.2515696 mass_center=(0.0353847 0.00613608 -0.0178969) inertia_xx=0.0001214729
        inertia_yy=0.0002429459 inertia_zz=0.001214729 meshes=r_bofoot.vtp
      PinJoint mtp_r: parent_body=calcn_r location_in_parent=(0.1828552 -0.002045361 0.001104495)
          orientation_in_parent=(-3.141593 0.6199005 0) location=(0 0 0) orientation=(-3.141593 0.6199005 0)
        Coordinate mtp_angle_r: motion_type=rotational default_value=0 range=(-0.5235988 0.5235988) clamped=true
            locked=true
    Body femur_l: mass=10.80309 mass_center=(0 -0.17723 0) inertia_xx=0.169964 inertia_yy=0.04618034
        inertia_zz=0.169964 meshes=l_femur.vtp
      CustomJoint hip_l: parent_body=pelvis location_in_parent=(-0.05368225 -0.07487241 -0.08003796) location=(0 0 0)
        Coordinate hip_flexion_l: motion_type=rotational default_value=-1.053969e-9 range=(-0.7853982 1.570796)
            clamped=true
        Coordinate hip_adduction_l: motion_type=rotational default_value=-7.844959e-9 range=(-1.047198 0.6981317)
            clamped=true
        Coordinate hip_rotation_l: motion_type=rotational default_value=0 range=(-0.5235988 1.047198) clamped=true
        SpatialTransform: axes_held_at_zero=(translation1 translation2 translation3)
          TransformAxis rotation1: coordinates=hip_flexion_l axis=(0 0 1) LinearFunction(coefficients=1 0)
          TransformAxis rotation2: coordinates=hip_adduction_l axis=(1 0 0) LinearFunction(coefficients=-1 0)
          TransformAxis rotation3: coordinates=hip_rotation_l axis=(0 1 0) LinearFunction(coefficients=-1 0)
      WrapCylinder Gastroc_at_condyles_l: translation=(0.00521266 -0.427438 0) quadrant=all radius=0.02606329
          length=0.1086578
      WrapCylinder KnExt_at_fem_l: xyz_body_rotation=(0.0623366 -0.0507601 0)
          translation=(0.0037409 -0.419861 -0.00227215) quadrant=all radius=0.02606691 length=0.10863
      WrapCylinder AB_at_femshaft_l: xyz_body_rotation=(-1.66157 -0.186644 0)
          translation=(0.0152662 -0.117384 -0.0253879) quadrant=all radius=0.01756234 length=0.07300219
      WrapCylinder AL_at_femshaft_l: xyz_body_rotation=(-1.77711 -0.136489 0)
          translation=(0.0320398 -0.241772 -0.0164222) quadrant=all radius=0.02137969 length=0.1044382
      WrapCylinder AMprox_at_femshaft_l: xyz_body_rotation=(-1.61126 -0.18656 0)
          translation=(0.00540343 -0.0759951 -0.0276024) quadrant=all radius=0.02246139 length=0.07298218
      WrapCylinder AMmid_at_femshaft_l: xyz_body_rotation=(-1.61139 -0.13656 0)
          translation=(0.0239913 -0.167546 -0.0223663) quadrant=all radius=0.02278073 length=0.1251125
      WrapCylinder AMdist_at_femshaft_l: xyz_body_rotation=(-1.71188 -0.186636 0)
          translation=(0.0329508 -0.271826 -0.0101754) quadrant=all radius=0.02319833 length=0.208678
      WrapCylinder AMisch_at_condyles_l: xyz_body_rotation=(-1.71115 0.463363 0)
          translation=(-0.0236145 -0.392858 0.00342747) quadrant=all radius=0.04256882 length=0.2503766
      WrapCylinder PECT_at_femshaft_l: xyz_body_rotation=(-1.81295 -0.276344 0)
          translation=(0.00634457 -0.0880969 -0.033076) quadrant=all radius=0.01595114 length=0.05224613
    Body origin_tibia_l: mass=4.306068 mass_center=(0 -0.212245 0) inertia_xx=0.07523347 inertia_yy=0.006819193
        inertia_zz=0.07523347 meshes=(l_tibia.vtp l_fibula.vtp)
      CustomJoint knee_l: parent_body=femur_l location_in_parent=(-0.00843408 -0.4253112 0.002988091)
          orientation_in_parent=(1.641568 -1.446181 1.570796) location=(-0.00919639 -0.004018449 0.001503557)
          orientation=(1.641568 -1.446181 1.570796)
        Coordinate knee_angle_l: motion_type=rotational default_value=0.0001269535 range=(-0.1745329 2.094395)
            clamped=true
        SpatialTransform: axes_held_at_zero=translation3
          TransformAxis rotation1: coordinates=knee_angle_l axis=(-1 0 0) LinearFunction(coefficients=1 0)
          TransformAxis rotation2: coordinates=knee_angle_l axis=(0 0 1)
            SimmSpline: x=(0 0.174533 0.349066 0.523599 0.698132 0.872665 1.0472 1.22173 1.39626 1.5708 1.74533 1.91986 2.0944)
                y=(0 0.0126809 0.0226969 0.0296054 0.0332049 0.0335354 0.0308779 0.0257548 0.0189295 0.011407 0.00443314 -0.00050475 -0.0016782)
          TransformAxis rotation3: coordinates=knee_angle_l axis=(0 1 0)
            SimmSpline: x=(0 0.174533 0.349066 0.523599 0.698132 0.872665 1.0472 1.22173 1.39626 1.5708 1.74533 1.91986 2.0944)
                y=(0 -0.059461 -0.109399 -0.150618 -0.18392 -0.210107 -0.229983 -0.24435 -0.254012 -0.25977 -0.262428 -0.262788 -0.261654)
          TransformAxis translation1: coordinates=knee_angle_l axis=(0 1 0)
            MultiplierFunction: scale=1.042532
              SimmSpline: x=(0 0.174533 0.349066 0.523599 0.698132 0.872665 1.0472 1.22173 1.39626 1.5708 1.74533 1.91986 2.0944)
                  y=(0 0.000479 0.000835 0.001086 0.001251 0.001346 0.001391 0.001403 0.0014 0.0014 0.001421 0.001481 0.001599)
          TransformAxis translation2: coordinates=knee_angle_l axis=(0 0 1)
            MultiplierFunction: scale=1.086578
              SimmSpline: x=(0 0.174533 0.349066 0.523599 0.698132 0.872665 1.0472 1.22173 1.39626 1.5708 1.74533 1.91986 2.0944)
                  y=(0 -0.000988 -0.001899 -0.002734 -0.003492 -0.004173 -0.004777 -0.005305 -0.005756 -0.00613 -0.006427 -0.006648 -0.006792)
      WrapCylinder GasLat_at_shank_l: xyz_body_rotation=(-2.96723 0.279725 -1.47812)
          translation=(-0.0084125 -0.084125 0.00334182) quadrant=-y radius=0.06218863 length=0.1026289
      WrapCylinder GasMed_at_shank_l: xyz_body_rotation=(-2.96723 -0.0279725 -1.47812)
          translation=(-0.0084125 -0.084125 0.00334182) quadrant=-y radius=0.06242564 length=0.1016731
      WrapCylinder GR_at_condyles_l: xyz_body_rotation=(0 0.4 0) translation=(-0.00341047 -0.0227365 0) quadrant=all
          radius=0.04060276 length=0.1032462
      WrapCylinder SM_at_condyles_l: xyz_body_rotation=(0 0.1 0) translation=(-0.00113682 -0.0227365 0) quadrant=all
          radius=0.03999564 length=0.1013986
      WrapCylinder ST_at_condyles_l: xyz_body_rotation=(0 0.2 0) translation=(-0.00227365 -0.0233049 0) quadrant=all
          radius=0.04821641 length=0.1017861
      WrapCylinder BF_at_gastroc_l: translation=(-0.0659358 -0.0682095 0) quadrant=all radius=0.03410475
          length=0.151901
    Body medialTibia_l: mass=1.161448e-8 mass_center=(0 0 0) inertia_xx=1.161448e-8 inertia_yy=1.161448e-8
        inertia_zz=1.161448e-8 meshes=Cube.vtp
      CustomJoint medialTibia_l: parent_body=origin_tibia_l location_in_parent=(0 -0.03648855 0.02759959)
          location=(0 -0.03648855 0.02759959)
        Coordinate medialTibiaPivotPoint_flex_l: motion_type=rotational default_value=0 range=(0 0) clamped=false
            locked=true
        Coordinate medialTibiaPivotPoint_add_l: motion_type=rotational default_value=0 range=(0 0) clamped=false
            locked=true
        Coordinate medialTibiaPivotPoint_int_l: motion_type=rotational default_value=0 range=(0 0) clamped=false
            locked=true
        SpatialTransform: axes_held_at_zero=(translation1 translation2 translation3)
          TransformAxis rotation1: coordinates=medialTibiaPivotPoint_flex_l axis=(0 0 1)
              LinearFunction(coefficients=1 0)
          TransformAxis rotation2: coordinates=medialTibiaPivotPoint_add_l axis=(1 0 0)
              LinearFunction(coefficients=1 0)
          TransformAxis rotation3: coordinates=medialTibiaPivotPoint_int_l axis=(0 1 0)
              LinearFunction(coefficients=1 0)
    Body lateralTibia_l: mass=1.161448e-8 mass_center=(0 0 0) inertia_xx=1.161448e-8 inertia_yy=1.161448e-8
        inertia_zz=1.161448e-8 meshes=Cube.vtp
      CustomJoint lateralTibia_l: parent_body=medialTibia_l location_in_parent=(0 -0.03648855 -0.02759959)
          location=(0 -0.03648855 -0.02759959)
        Coordinate lateralTibiaPivotPoint_flex_l: motion_type=rotational default_value=0 range=(0 0) clamped=false
            locked=true
        Coordinate lateralTibiaPivotPoint_add_l: motion_type=rotational default_value=0 range=(0 0) clamped=false
            locked=true
        Coordinate lateralTibiaPivotPoint_int_l: motion_type=rotational default_value=0 range=(0 0) clamped=false
            locked=true
        SpatialTransform: axes_held_at_zero=(translation1 translation2 translation3)
          TransformAxis rotation1: coordinates=lateralTibiaPivotPoint_flex_l axis=(0 0 1)
              LinearFunction(coefficients=1 0)
          TransformAxis rotation2: coordinates=lateralTibiaPivotPoint_add_l axis=(1 0 0)
              LinearFunction(coefficients=1 0)
          TransformAxis rotation3: coordinates=lateralTibiaPivotPoint_int_l axis=(0 1 0)
              LinearFunction(coefficients=1 0)
    Body patella_l: mass=0.1001168 mass_center=(0.0018 0.0264 0) inertia_xx=3.333355e-6 inertia_yy=1.522658e-5
        inertia_zz=1.522658e-5 meshes=l_pat.vtp
      CustomJoint patellofemoral_l: parent_body=femur_l location_in_parent=(-0.00843408 -0.4253112 0.002988091)
          location=(0 0 0)
        Coordinate knee_angle_l_beta: motion_type=rotational default_value=0.0001269535 range=(-99999.9 99999.9)
            clamped=false
        SpatialTransform: axes_held_at_zero=(rotation2 rotation3)
          TransformAxis rotation1: coordinates=knee_angle_l_beta axis=(0 0 1)
            SimmSpline f25: x=(0 0.174533 0.349066 0.523599 0.698132 0.872665 1.0472 1.22173 1.39626 1.5708 1.74533 1.91986 2.0944)
                y=(0.00113686 -0.00629212 -0.105582 -0.253683 -0.414245 -0.579047 -0.747244 -0.91799 -1.09044 -1.26379 -1.43763 -1.61186 -1.78634)
          TransformAxis translation1: coordinates=knee_angle_l_beta axis=(1 0 0)
            MultiplierFunction: scale=1.042532
              SimmSpline f23: x=(0 0.174533 0.349066 0.523599 0.698132 0.872665 1.0472 1.22173 1.39626 1.5708 1.74533 1.91986 2.0944)
                  y=(0.0524 0.0488 0.0437 0.0371 0.0296 0.0216 0.0136 0.0057 -0.0019 -0.0088 -0.0148 -0.0196 -0.0227)
          TransformAxis translation2: coordinates=knee_angle_l_beta axis=(0 1 0)
            MultiplierFunction: scale=1.042532
              SimmSpline f24: x=(0 0.174533 0.349066 0.523599 0.698132 0.872665 1.0472 1.22173 1.39626 1.5708 1.74533 1.91986 2.0944)
                  y=(-0.0108 -0.019 -0.0263 -0.0322 -0.0367 -0.0395 -0.0408 -0.0404 -0.0384 -0.0349 -0.0301 -0.0245 -0.0187)
          TransformAxis translation3: axis=(0 0 1) MultiplierFunction(scale=1.086578, Constant(value=-0.00275))
    Body dummyTibia_l: mass=0.001 mass_center=(0 0 0) inertia_xx=1e-8 inertia_yy=1e-8 inertia_zz=1e-8 meshes=Cube.vtp
      CustomJoint dummyTibiofemoral_l: parent_body=lateralTibia_l
          location_in_parent=(-0.00808954 -0.0035348 -0.00148474) orientation_in_parent=(1.641568 -1.446181 1.570796)
          location=(-0.00808954 -0.0035348 -0.00148474) orientation=(1.641568 -1.446181 1.570796)
        Coordinate dummyTibiofemoral_flex_l: motion_type=rotational default_value=0 range=(0 0) clamped=false
            locked=true
        Coordinate dummyTibiofemoral_add_l: motion_type=rotational default_value=0 range=(0 0) clamped=false
            locked=true
        Coordinate dummyTibiofemoral_int_l: motion_type=rotational default_value=0 range=(0 0) clamped=false
            locked=true
        Coordinate dummyTibiofemoral_x_l: motion_type=translational default_value=0 range=(0 0) clamped=false
            locked=true
        Coordinate dummyTibiofemoral_y_l: motion_type=translational default_value=0 range=(0 0) clamped=false
            locked=true
        Coordinate dummyTibiofemoral_z_l: motion_type=translational default_value=0 range=(0 0) clamped=false
            locked=true
        SpatialTransform:
          TransformAxis rotation1: coordinates=dummyTibiofemoral_flex_l axis=(1 0 0) LinearFunction(coefficients=1 0)
          TransformAxis rotation2: coordinates=dummyTibiofemoral_add_l axis=(0 0 1) LinearFunction(coefficients=1 0)
          TransformAxis rotation3: coordinates=dummyTibiofemoral_int_l axis=(0 1 0) LinearFunction(coefficients=1 0)
          TransformAxis translation1: coordinates=dummyTibiofemoral_x_l axis=(1 0 0) LinearFunction(coefficients=1 0)
          TransformAxis translation2: coordinates=dummyTibiofemoral_y_l axis=(0 1 0) LinearFunction(coefficients=1 0)
          TransformAxis translation3: coordinates=dummyTibiofemoral_z_l axis=(0 0 1) LinearFunction(coefficients=1 0)
    Body talus_l: mass=0.1161448 mass_center=(0 0 0) inertia_xx=0.001203296 inertia_yy=0.001203296
        inertia_zz=0.001203296 meshes=l_talus.vtp
      PinJoint ankle_l: parent_body=lateralTibia_l location_in_parent=(-0.01 -0.454728 0)
          orientation_in_parent=(-0.1758952 0.105208 0.01866219) location=(0 0 0)
          orientation=(-0.1758952 0.105208 0.01866219)
        Coordinate ankle_angle_l: motion_type=rotational default_value=-6.861745e-9 range=(-1.308997 0.7853982)
            clamped=true
    Body calcn_l: mass=1.45181 mass_center=(0.101786 0.0305357 0) inertia_xx=0.001684614 inertia_yy=0.004692855
        inertia_zz=0.004933514 meshes=l_foot.vtp
      PinJoint subtalar_l: parent_body=talus_l location_in_parent=(-0.04964084 -0.04269906 -0.00806142)
          orientation_in_parent=(1.768191 -0.906223 1.819602) location=(0 0 0)
          orientation=(1.768191 -0.906223 1.819602)
        Coordinate subtalar_angle_l: motion_type=rotational default_value=0 range=(-0.3490659 0.3490659) clamped=true
            locked=true
    Body toes_l: mass=0.2515696 mass_center=(0.0352178 0.00610714 0.0178125) inertia_xx=0.0001203296
        inertia_yy=0.0002406592 inertia_zz=0.001203296 meshes=l_bofoot.vtp
      PinJoint mtp_l: parent_body=calcn_l location_in_parent=(0.1819927 -0.002035712 -0.001099285)
          orientation_in_parent=(-3.141593 -0.6199005 0) location=(0 0 0) orientation=(-3.141593 -0.6199005 0)
        Coordinate mtp_angle_l: motion_type=rotational default_value=0 range=(-0.5235988 0.5235988) clamped=true
            locked=true
    Body torso: mass=31.1577 mass_center=(-0.0293982 0.293212 0) inertia_xx=1.514993 inertia_yy=0.89104
        inertia_zz=1.514993 meshes=(hat_spine.vtp hat_jaw.vtp hat_skull.vtp hat_ribs_scap.vtp)
      CustomJoint back: parent_body=pelvis location_in_parent=(-0.09605875 0.07774368 0) location=(0 0 0)
        Coordinate lumbar_extension: motion_type=rotational default_value=0 range=(-1.570796 1.570796) clamped=true
        Coordinate lumbar_bending: motion_type=rotational default_value=0 range=(-1.570796 1.570796) clamped=true
        Coordinate lumbar_rotation: motion_type=rotational default_value=0 range=(-1.570796 1.570796) clamped=true
        SpatialTransform: axes_held_at_zero=(translation1 translation2 translation3)
          TransformAxis rotation1: coordinates=lumbar_extension axis=(0 0 1) LinearFunction(coefficients=1 0)
          TransformAxis rotation2: coordinates=lumbar_bending axis=(1 0 0) LinearFunction(coefficients=1 0)
          TransformAxis rotation3: coordinates=lumbar_rotation axis=(0 1 0) LinearFunction(coefficients=1 0)
    Body humerus_r: mass=2.360643 mass_center=(0 -0.168463 0) inertia_xx=0.01455083 inertia_yy=0.005019585
        inertia_zz=0.01633284 meshes=humerus_rv.vtp
      CustomJoint acromial_r: parent_body=torso location_in_parent=(0.003091709 0.3404004 0.1761622) location=(0 0 0)
        Coordinate arm_flex_r: motion_type=rotational default_value=0 range=(-1.570796 2.570796) clamped=true
        Coordinate arm_add_r: motion_type=rotational default_value=5.394851e-9 range=(-2.094395 1.570796) clamped=true
        Coordinate arm_rot_r: motion_type=rotational default_value=0 range=(-1.570796 1.570796) clamped=true
        SpatialTransform: axes_held_at_zero=(translation1 translation2 translation3)
          TransformAxis rotation1: coordinates=arm_flex_r axis=(0 0 1) LinearFunction(coefficients=1 0)
          TransformAxis rotation2: coordinates=arm_add_r axis=(1 0 0) LinearFunction(coefficients=1 0)
          TransformAxis rotation3: coordinates=arm_rot_r axis=(0 1 0) LinearFunction(coefficients=1 0)
    Body ulna_r: mass=0.7055796 mass_center=(0 -0.129905 0) inertia_xx=0.003996535 inertia_yy=0.0008338484
        inertia_zz=0.004335202 meshes=ulna_rv.vtp
      PinJoint elbow_r: parent_body=humerus_r location_in_parent=(0.01346047 -0.2931657 -0.009826022)
          orientation_in_parent=(-0.02286271 0.2280177 0.005168901) location=(0 0 0)
          orientation=(-0.02286271 0.2280177 0.005168901)
        Coordinate elbow_flex_r: motion_type=rotational default_value=0.0001269348 range=(0 2.618) clamped=true
    Body radius_r: mass=0.7055796 mass_center=(0 -0.129905 0) inertia_xx=0.003996535 inertia_yy=0.0008338484
        inertia_zz=0.004335202 meshes=radius_rv.vtp
      PinJoint radioulnar_r: parent_body=ulna_r location_in_parent=(-0.007250549 -0.01401931 0.02811299)
          orientation_in_parent=(-1.568841 0.05642797 1.536144) location=(0 0 0)
          orientation=(-1.568841 0.05642797 1.536144)
        Coordinate pro_sup_r: motion_type=rotational default_value=1.570766 range=(0 1.570796) clamped=true
    Body hand_r: mass=0.5313624 mass_center=(0 -0.0719105 0) inertia_xx=0.001155364 inertia_yy=0.0007085023
        inertia_zz=0.001735636
        meshes=(pisiform_rvs.vtp lunate_rvs.vtp scaphoid_rvs.vtp triquetrum_rvs.vtp hamate_rvs.vtp capitate_rvs.vtp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)
      UniversalJoint radius_hand_r: parent_body=radius_r location_in_parent=(-0.009481653 -0.254196 0.01466924)
          orientation_in_parent=(-1.570796 0 -1.570796) location=(0 0 0) orientation=(-1.570796 0 -1.570796)
        Coordinate wrist_flex_r: motion_type=rotational default_value=0 range=(-1.22173 1.22173) clamped=true
            locked=true
        Coordinate wrist_dev_r: motion_type=rotational default_value=0 range=(-0.4363323 0.6108652) clamped=true
            locked=true
    Body humerus_l: mass=2.360643 mass_center=(0 -0.167361 0) inertia_xx=0.0143612 inertia_yy=0.004954169
        inertia_zz=0.01611998 meshes=humerus_lv.vtp
      CustomJoint acromial_l: parent_body=torso location_in_parent=(0.003091709 0.3404004 -0.1761622) location=(0 0 0)
        Coordinate arm_flex_l: motion_type=rotational default_value=0 range=(-1.570796 2.570796) clamped=true
        Coordinate arm_add_l: motion_type=rotational default_value=5.394851e-9 range=(-2.094395 1.570796) clamped=true
        Coordinate arm_rot_l: motion_type=rotational default_value=0 range=(-1.570796 1.570796) clamped=true
        SpatialTransform: axes_held_at_zero=(translation1 translation2 translation3)
          TransformAxis rotation1: coordinates=arm_flex_l axis=(0 0 1) LinearFunction(coefficients=1 0)
          TransformAxis rotation2: coordinates=arm_add_l axis=(-1 0 0) LinearFunction(coefficients=1 0)
          TransformAxis rotation3: coordinates=arm_rot_l axis=(0 -1 0) LinearFunction(coefficients=1 0)
    Body ulna_l: mass=0.7055796 mass_center=(0 -0.127187 0) inertia_xx=0.003831034 inertia_yy=0.0007993177
        inertia_zz=0.004155676 meshes=ulna_lv.vtp
      PinJoint elbow_l: parent_body=humerus_l location_in_parent=(0.01337247 -0.2912491 0.009761784)
          orientation_in_parent=(0.02286271 -0.2280177 0.005168901) location=(0 0 0)
          orientation=(0.02286271 -0.2280177 0.005168901)
        Coordinate elbow_flex_l: motion_type=rotational default_value=0.0001269348 range=(0 2.618) clamped=true
    Body radius_l: mass=0.7055796 mass_center=(0 -0.127187 0) inertia_xx=0.003831034 inertia_yy=0.0007993177
        inertia_zz=0.004155676 meshes=radius_lv.vtp
      PinJoint radioulnar_l: parent_body=ulna_l location_in_parent=(-0.007098835 -0.01372596 -0.02752474)
          orientation_in_parent=(1.568841 -0.05642797 1.536144) location=(0 0 0)
          orientation=(1.568841 -0.05642797 1.536144)
        Coordinate pro_sup_l: motion_type=rotational default_value=1.570766 range=(0 1.570796) clamped=true
    Body hand_l: mass=0.5313624 mass_center=(0 -0.075785 0) inertia_xx=0.001283218 inertia_yy=0.0007869064
        inertia_zz=0.001927705
        meshes=(pisiform_lvs.vtp lunate_lvs.vtp scaphoid_lvs.vtp triquetrum_lvs.vtp hamate_lvs.vtp capitate_lvs.vtp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)
      UniversalJoint radius_hand_l: parent_body=radius_l location_in_parent=(-0.009283254 -0.2488771 -0.01436229)
          orientation_in_parent=(1.570796 0 1.570796) location=(0 0 0) orientation=(1.570796 0 1.570796)
        Coordinate wrist_flex_l: motion_type=rotational default_value=0 range=(-1.22173 1.22173) clamped=true
            locked=true
        Coordinate wrist_dev_l: motion_type=rotational default_value=0 range=(-0.4363323 0.6108652) clamped=true
            locked=true
  ConstraintSet:
    CoordinateCouplerConstraint patellofemoral_knee_angle_r_con: independent_coordinate_names=knee_angle_r
        dependent_coordinate_name=knee_angle_r_beta scale_factor=1
        coupled_coordinates_function=LinearFunction(coefficients=1 0)
    CoordinateCouplerConstraint patellofemoral_knee_angle_l_con: independent_coordinate_names=knee_angle_l
        dependent_coordinate_name=knee_angle_l_beta scale_factor=1
        coupled_coordinates_function=LinearFunction(coefficients=1 0)
  ForceSet:
    Millard2012EquilibriumMuscle [values shared by the 80 below unless stated]: fiber_damping=0.01
        default_activation=0.01 minimum_activation=0.01
      ActiveForceLengthCurve: min_norm_active_fiber_length=0.25 transition_norm_fiber_length=0.77
          max_norm_active_fiber_length=1.9 shallow_ascending_slope=0.75 minimum_value=0
      ForceVelocityCurve: concentric_slope_at_vmax=0 concentric_slope_near_vmax=0.25 isometric_slope=5
          eccentric_slope_at_vmax=0 eccentric_slope_near_vmax=0.15 max_eccentric_velocity_force_multiplier=1.4
      FiberForceLengthCurve: strain_at_zero_force=0 strain_at_one_norm_force=0.7
      TendonForceLengthCurve
    Millard2012EquilibriumMuscle addbrev_r: max_isometric_force=625.8197 optimal_fiber_length=0.1037464
        tendon_slack_length=0.03916491 pennation_angle_at_optimal=0.1147809 [radians] ignore_tendon_compliance=true
      PathPoint P1: pelvis (-0.0182197 -0.0896676 0.0159537)
      PathPoint P2: femur_r (-0.00204976 -0.120936 0.0256872)
      PathWrap: wrap_object=AB_at_femshaft_r method=hybrid
    Millard2012EquilibriumMuscle addlong_r: max_isometric_force=916.8 optimal_fiber_length=0.1078477
        tendon_slack_length=0.1392095 pennation_angle_at_optimal=0.1377704
      PathPoint P1: pelvis (-0.00723064 -0.0848026 0.0195588)
      PathPoint P2: femur_r (0.0115402 -0.245326 0.0163305)
      PathWrap: wrap_object=AL_at_femshaft_r method=hybrid
    Millard2012EquilibriumMuscle addmagDist_r: max_isometric_force=597.2951 optimal_fiber_length=0.174599
        tendon_slack_length=0.09743335 pennation_angle_at_optimal=0.194705 ignore_tendon_compliance=true
      PathPoint P1: pelvis (-0.0706275 -0.121786 0.0412518)
      PathPoint P2: femur_r (0.0115299 -0.269031 0.0199102)
      PathWrap: wrap_object=AMdist_at_femshaft_r method=hybrid
    Millard2012EquilibriumMuscle addmagIsch_r: max_isometric_force=597.2951 optimal_fiber_length=0.1519688
        tendon_slack_length=0.2309784 pennation_angle_at_optimal=0.1680443
      PathPoint P1: pelvis (-0.0854894 -0.123779 0.0432097)
      PathPoint P2: femur_r (0.00492968 -0.397623 -0.0337648)
      PathWrap: wrap_object=AMisch_at_condyles_r method=hybrid
    Millard2012EquilibriumMuscle addmagMid_r: max_isometric_force=597.2951 optimal_fiber_length=0.1384212
        tendon_slack_length=0.05155809 pennation_angle_at_optimal=0.2073076 ignore_tendon_compliance=true
      PathPoint P1: pelvis (-0.0502329 -0.115185 0.0295662)
      PathPoint P2: femur_r (0.00248021 -0.166441 0.0301438)
      PathWrap: wrap_object=AMmid_at_femshaft_r method=hybrid
    Millard2012EquilibriumMuscle addmagProx_r: max_isometric_force=597.2951 optimal_fiber_length=0.106133
        tendon_slack_length=0.04378819 pennation_angle_at_optimal=0.3114833 ignore_tendon_compliance=true
      PathPoint P1: pelvis (-0.0295521 -0.102593 0.0141408)
      PathPoint P2: femur_r (-0.0156499 -0.0808222 0.0330323)
      PathWrap: wrap_object=AMprox_at_femshaft_r method=hybrid
    Millard2012EquilibriumMuscle bflh_r: max_isometric_force=1313.184 optimal_fiber_length=0.09868669
        tendon_slack_length=0.3352757 pennation_angle_at_optimal=0.1759182
      PathPoint P1: pelvis (-0.0992067 -0.113611 0.060707)
      PathPoint P2: dummyTibia_r (-0.037778 -0.0392353 0.0230877)
      PathPoint P3: dummyTibia_r (-0.0321729 -0.0510059 0.0276504)
    Millard2012EquilibriumMuscle bfsh_r: max_isometric_force=557.1148 optimal_fiber_length=0.1253761
        tendon_slack_length=0.09755572 pennation_angle_at_optimal=0.2642232 ignore_tendon_compliance=true
      PathPoint P1: femur_r (0.00512441 -0.216353 0.0241398)
      PathPoint P2: dummyTibia_r (-0.0337423 -0.0469702 0.0290193)
      PathWrap: wrap_object=BF_at_gastroc_r method=hybrid
    Millard2012EquilibriumMuscle edl_r: max_isometric_force=603.4982 optimal_fiber_length=0.07391644
        tendon_slack_length=0.4009679 pennation_angle_at_optimal=0.2182582
      PathPoint P1: origin_tibia_r (-0.0179361 -0.129701 0.0187074)
      PathPoint P2: origin_tibia_r (0.0183845 -0.421499 0.0102206)
      PathPoint P3: calcn_r (0.0939843 0.0368165 0.000818144)
      PathPoint P4: calcn_r (0.165265 0.00562474 0.0132948)
      PathPoint P5: toes_r (0.000306804 0.0048066 0.015647)
      PathPoint P6: toes_r (0.0453047 -0.000409072 0.025567)
    Millard2012EquilibriumMuscle ehl_r: max_isometric_force=285.8675 optimal_fiber_length=0.08053979
        tendon_slack_length=0.3522753 pennation_angle_at_optimal=0.1972681
      PathPoint P1: origin_tibia_r (-0.0156941 -0.173756 0.0172473)
      PathPoint P2: origin_tibia_r (0.00795916 -0.326101 0.0149659)
      PathPoint P3: origin_tibia_r (0.0224202 -0.413988 -0.00255516)
      PathPoint P4: calcn_r (0.0992 0.0397823 -0.0215786)
      PathPoint P5: calcn_r (0.132233 0.0316008 -0.0262829)
      PathPoint P6: calcn_r (0.177333 0.0142153 -0.028635)
      PathPoint P7: toes_r (0.0304759 0.00419299 -0.0250557)
      PathPoint P8: toes_r (0.0575769 0.00347711 -0.0190219)
    Millard2012EquilibriumMuscle fdl_r: max_isometric_force=423.177 optimal_fiber_length=0.04721471
        tendon_slack_length=0.4073673 pennation_angle_at_optimal=0.2248391
      PathPoint P1: origin_tibia_r (-0.00257832 -0.205369 -0.0016426)
      PathPoint P2: origin_tibia_r (-0.0197297 -0.408607 -0.0113157)
      PathPoint P3: calcn_r (0.0445889 0.0322144 -0.028635)
      PathPoint P4: calcn_r (0.0724058 0.0179992 -0.0268965)
      PathPoint P5: calcn_r (0.16956 -0.00828371 0.0118631)
      PathPoint P6: toes_r (-0.00194309 -0.00797691 0.0150334)
      PathPoint P7: toes_r (0.0291464 -0.00726103 0.0219876)
      PathPoint P8: toes_r (0.0451002 -0.00613608 0.0247489)
    Millard2012EquilibriumMuscle fhl_r: max_isometric_force=907.8393 optimal_fiber_length=0.05565621
        tendon_slack_length=0.3784316 pennation_angle_at_optimal=0.2580255
      PathPoint P1: origin_tibia_r (-0.0347512 -0.242474 0.0182511)
      PathPoint P2: origin_tibia_r (-0.0271284 -0.411522 -0.00693542)
      PathPoint P3: calcn_r (0.0382482 0.028226 -0.0246466)
      PathPoint P4: calcn_r (0.106154 0.00695423 -0.0261806)
      PathPoint P5: calcn_r (0.176515 -0.00542021 -0.0275101)
      PathPoint P6: toes_r (0.0158515 -0.00654515 -0.027101)
      PathPoint P7: toes_r (0.0574746 -0.0104313 -0.0185105)
    Millard2012EquilibriumMuscle gaslat_r: max_isometric_force=1575.059 optimal_fiber_length=0.05948072
        tendon_slack_length=0.425477 pennation_angle_at_optimal=0.2102268
      PathPoint P1: femur_r (-0.00307465 -0.39089 0.0285758)
      PathPoint P2: calcn_r (0.00449979 0.0317031 -0.00542021)
      PathWrap: wrap_object=GasLat_at_shank_r method=hybrid
      PathWrap: wrap_object=Gastroc_at_condyles_r method=hybrid
    Millard2012EquilibriumMuscle gasmed_r: max_isometric_force=3115.515 optimal_fiber_length=0.05149153
        tendon_slack_length=0.449087 pennation_angle_at_optimal=0.1656816
      PathPoint P1: femur_r (0.00819905 -0.388225 -0.0214576)
      PathPoint P2: calcn_r (0.00449979 0.0317031 -0.00542021)
      PathWrap: wrap_object=GasMed_at_shank_r method=hybrid
      PathWrap: wrap_object=Gastroc_at_condyles_r method=hybrid
    Millard2012EquilibriumMuscle glmax1_r: max_isometric_force=983.7836 optimal_fiber_length=0.1440785
        tendon_slack_length=0.047527 pennation_angle_at_optimal=0.3540118 ignore_tendon_compliance=true
      PathPoint P1: pelvis (-0.117426 0.0329099 0.0583243)
      PathPoint P2: pelvis (-0.119907 -0.0230846 0.080701)
      PathPoint P3: femur_r (-0.0455047 -0.0334111 0.0311548)
      PathPoint P4: femur_r (-0.0283892 -0.0580083 0.0484859)
      PathWrap: wrap_object=Gmax1_at_pelvis_r method=hybrid
    Millard2012EquilibriumMuscle glmax2_r: max_isometric_force=1406.046 optimal_fiber_length=0.1543303
        tendon_slack_length=0.06849037 pennation_angle_at_optimal=0.3673821 ignore_tendon_compliance=true
      PathPoint P1: pelvis (-0.12563 0.00829902 0.0478612)
      PathPoint P2: pelvis (-0.128206 -0.0580931 0.0842232)
      PathPoint P3: femur_r (-0.0461197 -0.0598531 0.0259967)
      PathPoint P4: femur_r (-0.0159882 -0.104128 0.0432247)
      PathWrap: wrap_object=Gmax2_at_pelvis_r method=hybrid
    Millard2012EquilibriumMuscle glmax3_r: max_isometric_force=947.7541 optimal_fiber_length=0.1622355
        tendon_slack_length=0.07563418 pennation_angle_at_optimal=0.3824161 ignore_tendon_compliance=true
      PathPoint P1: pelvis (-0.124008 -0.0500803 0.0093236)
      PathPoint P2: pelvis (-0.121433 -0.120479 0.0450641)
      PathPoint P3: femur_r (-0.0287992 -0.115299 0.00969719)
      PathPoint P4: femur_r (-0.00614929 -0.145431 0.0423994)
      PathWrap: wrap_object=Gmax3_at_pelvis_r method=hybrid
    Millard2012EquilibriumMuscle glmed1_r: max_isometric_force=1093.467 optimal_fiber_length=0.07474686
        tendon_slack_length=0.05017187 pennation_angle_at_optimal=0.3165559 ignore_tendon_compliance=true
      PathPoint P1: pelvis (-0.042449 0.0233708 0.121414)
      PathPoint P2: femur_r (-0.0223424 -0.0119911 0.0572547)
    Millard2012EquilibriumMuscle glmed2_r: max_isometric_force=765.0917 optimal_fiber_length=0.07363926
        tendon_slack_length=0.06118156 pennation_angle_at_optimal=0.3165559 ignore_tendon_compliance=true
      PathPoint P1: pelvis (-0.0810824 0.0301436 0.069927)
      PathPoint P2: femur_r (-0.0264419 -0.00594431 0.0543662)
    Millard2012EquilibriumMuscle glmed3_r: max_isometric_force=871.1993 optimal_fiber_length=0.07264806
        tendon_slack_length=0.04415778 pennation_angle_at_optimal=0.3165559 ignore_tendon_compliance=true
      PathPoint P1: pelvis (-0.10989 -0.00696354 0.0544913)
      PathPoint P2: femur_r (-0.0316688 -0.00481694 0.0534377)
    Millard2012EquilibriumMuscle glmin1_r: max_isometric_force=374.0459 optimal_fiber_length=0.06905887
        tendon_slack_length=0.01308911 pennation_angle_at_optimal=0.1745329 ignore_tendon_compliance=true
      PathPoint P1: pelvis (-0.0442614 -0.0142133 0.107947)
      PathPoint P2: femur_r (-0.00737915 -0.0106588 0.0577705)
    Millard2012EquilibriumMuscle glmin2_r: max_isometric_force=394.8197 optimal_fiber_length=0.0565872
        tendon_slack_length=0.02367379 pennation_angle_at_optimal=0 ignore_tendon_compliance=true
      PathPoint P1: pelvis (-0.0587609 -0.0135455 0.100591)
      PathPoint P2: femur_r (-0.00983886 -0.0106588 0.0577705)
    Millard2012EquilibriumMuscle glmin3_r: max_isometric_force=446.7738 optimal_fiber_length=0.0379534
        tendon_slack_length=0.04964069 pennation_angle_at_optimal=0.01745329
      PathPoint P1: pelvis (-0.0752635 -0.0147856 0.0826693)
      PathPoint P2: femur_r (-0.0138359 -0.00850652 0.0567389)
    Millard2012EquilibriumMuscle grac_r: max_isometric_force=281.3115 optimal_fiber_length=0.2418051
        tendon_slack_length=0.1733679 pennation_angle_at_optimal=0.1720016 ignore_tendon_compliance=true
      PathPoint P1: pelvis (-0.0451772 -0.12336 0.0254431)
      PathPoint P2: dummyTibia_r (-0.020649 -0.0533039 -0.0270208)
      PathPoint P3: dummyTibia_r (0.00199539 -0.0780446 -0.0143545)
      PathWrap: wrap_object=GR_at_condyles_r method=hybrid
    Millard2012EquilibriumMuscle iliacus_r: max_isometric_force=1021.141 optimal_fiber_length=0.1048767
        tendon_slack_length=0.09359106 pennation_angle_at_optimal=0.279914 ignore_tendon_compliance=true
      PathPoint P1: pelvis (-0.0577116 0.0294758 0.0873311)
      PathPoint P2: pelvis (-0.0128778 -0.0531328 0.0783183)
      PathPoint P3: femur_r (-0.00235723 -0.0579058 0.0143395)
      PathPoint P4: femur_r (-0.0125036 -0.065285 0.0202197)
      PathWrap: wrap_object=IL_at_brim_r method=hybrid range=(2 3)
    Millard2012EquilibriumMuscle perbrev_r: max_isometric_force=521.2016 optimal_fiber_length=0.01007443
        tendon_slack_length=0.2559105 pennation_angle_at_optimal=0.2052361
      PathPoint P1: origin_tibia_r (-0.0272405 -0.322674 0.0229051)
      PathPoint P2: origin_tibia_r (-0.0380022 -0.496117 0.0227226)
      PathPoint P3: origin_tibia_r (-0.0319487 -0.510264 0.0232702)
      PathPoint P4: calcn_r (0.0481682 0.0282386 0.0238285)
      PathPoint P5: calcn_r (0.0692355 0.0229047 0.0350779)
    Millard2012EquilibriumMuscle perlong_r: max_isometric_force=1115.371 optimal_fiber_length=0.06468509
        tendon_slack_length=0.4249165 pennation_angle_at_optimal=0.2479525
      PathPoint P1: origin_tibia_r (-0.0224202 -0.174973 0.0257341)
      PathPoint P2: origin_tibia_r (-0.035536 -0.49701 0.0216276)
      PathPoint P3: origin_tibia_r (-0.0304914 -0.511538 0.0219013)
      PathPoint P4: calcn_r (0.0447934 0.0240551 0.0226012)
      PathPoint P5: calcn_r (0.0696445 0.0110863 0.0290441)
      PathPoint P6: calcn_r (0.0871324 0.00721653 0.0120676)
      PathPoint P7: calcn_r (0.123028 0.00888993 -0.0188173)
    Millard2012EquilibriumMuscle piri_r: max_isometric_force=1029.787 optimal_fiber_length=0.02570901
        tendon_slack_length=0.1153951 pennation_angle_at_optimal=0.1745329
      PathPoint P1: pelvis (-0.0971176 -0.00622903 0.0139958)
      PathPoint P2: pelvis (-0.0973179 -0.0292469 0.0631104)
      PathPoint P3: femur_r (-0.0151682 -0.00368957 0.0450816)
    Millard2012EquilibriumMuscle psoas_r: max_isometric_force=1426.79 optimal_fiber_length=0.11673
        tendon_slack_length=0.09460813 pennation_angle_at_optimal=0.2155251 ignore_tendon_compliance=true
      PathPoint P1: pelvis (-0.057807 0.0591424 0.0404023)
      PathPoint P2: pelvis (-0.0195552 -0.0623857 0.0679587)
      PathPoint P3: femur_r (-0.0135284 -0.047862 0.00474543)
      PathPoint P4: femur_r (-0.0240847 -0.0537038 0.00907822)
      PathWrap: wrap_object=PS_at_brim_r method=hybrid range=(2 3)
    Millard2012EquilibriumMuscle recfem_r: max_isometric_force=2191.741 optimal_fiber_length=0.07471835
        tendon_slack_length=0.4661627 pennation_angle_at_optimal=0.2170149
      PathPoint P1: pelvis (-0.0228938 -0.0370117 0.0966547)
      PathPoint P2: patella_r (0.01 0.049 0.0007)
      PathPoint P3: patella_r (0.0121 0.0437 -0.001)
      PathPoint P4: patella_r (0.005 0.00247 3e-5)
      PathPoint P5: dummyTibia_r (0.0365449 -0.070758 -0.000428901)
      PathWrap: wrap_object=KnExt_at_fem_r method=hybrid
    Millard2012EquilibriumMuscle sart_r: max_isometric_force=249.4131 optimal_fiber_length=0.4017055
        tendon_slack_length=0.1424102 pennation_angle_at_optimal=0.02613542 ignore_tendon_compliance=true
      PathPoint P1: pelvis (-0.0186012 -0.014881 0.109397)
      PathPoint P2: femur_r (-0.00307465 -0.365678 -0.043431)
      PathPoint P3: dummyTibia_r (-0.0281373 -0.0449524 -0.0333083)
      PathPoint P4: dummyTibia_r (-0.017824 -0.0671484 -0.0240915)
      PathPoint P5: dummyTibia_r (0.0152457 -0.0908016 -0.00237264)
    Millard2012EquilibriumMuscle semimem_r: max_isometric_force=2200.987 optimal_fiber_length=0.07094304
        tendon_slack_length=0.357499 pennation_angle_at_optimal=0.2545615
      PathPoint P1: pelvis (-0.0941509 -0.108746 0.0636077)
      PathPoint P2: dummyTibia_r (-0.0325092 -0.046746 -0.0178861)
      PathWrap: wrap_object=SM_at_condyles_r method=hybrid
    Millard2012EquilibriumMuscle semiten_r: max_isometric_force=591.2951 optimal_fiber_length=0.1996722
        tendon_slack_length=0.2571678 pennation_angle_at_optimal=0.241295
      PathPoint P1: pelvis (-0.0990159 -0.119525 0.0533517)
      PathPoint P2: dummyTibia_r (-0.0349754 -0.0569472 -0.0208975)
      PathPoint P3: dummyTibia_r (0.00212992 -0.0866539 -0.0106769)
      PathWrap: wrap_object=ST_at_condyles_r method=hybrid
    Millard2012EquilibriumMuscle soleus_r: max_isometric_force=6194.843 optimal_fiber_length=0.04452539
        tendon_slack_length=0.3131479 pennation_angle_at_optimal=0.3814289
      PathPoint P1: origin_tibia_r (-0.00851966 -0.102684 0.00894305)
      PathPoint P2: calcn_r (0.00449979 0.0317031 -0.00542021)
    Millard2012EquilibriumMuscle tfl_r: max_isometric_force=411.2066 optimal_fiber_length=0.09585423
        tendon_slack_length=0.4597931 pennation_angle_at_optimal=0.05235988
      PathPoint P1: pelvis (-0.0296666 0.0204137 0.128562)
      PathPoint P2: femur_r (0.0301315 -0.101976 0.0615875)
      PathPoint P3: femur_r (0.0109662 -0.415077 0.0334244)
      PathPoint P4: dummyTibia_r (0.0121069 -0.0459613 0.0315744)
    Millard2012EquilibriumMuscle tibant_r: max_isometric_force=1227.452 optimal_fiber_length=0.06821214
        tendon_slack_length=0.2544407 pennation_angle_at_optimal=0.1951828
      PathPoint P1: origin_tibia_r (0.0172635 -0.167199 0.0147834)
      PathPoint P2: origin_tibia_r (0.0281373 -0.242898 0.0116807)
      PathPoint P3: origin_tibia_r (0.0261195 -0.41948 -0.0120457)
      PathPoint P4: calcn_r (0.119245 0.0182037 -0.0311917)
    Millard2012EquilibriumMuscle tibpost_r: max_isometric_force=1730.154 optimal_fiber_length=0.03991633
        tendon_slack_length=0.3120909 pennation_angle_at_optimal=0.2264891
      PathPoint P1: origin_tibia_r (-0.00459613 -0.146179 0.00939932)
      PathPoint P2: origin_tibia_r (-0.0183845 -0.409728 -0.0159697)
      PathPoint P3: calcn_r (0.0426458 0.0341575 -0.0292487)
      PathPoint P4: calcn_r (0.0789509 0.0162606 -0.0287373)
    Millard2012EquilibriumMuscle vasint_r: max_isometric_force=1697.361 optimal_fiber_length=0.102574
        tendon_slack_length=0.2111259 pennation_angle_at_optimal=0.06309973
      PathPoint P1: femur_r (0.0297216 -0.197187 0.0319801)
      PathPoint P2: femur_r (0.0343335 -0.213585 0.0294011)
      PathPoint P3: patella_r (0.0058 0.048 -0.0006)
      PathPoint P4: patella_r (0.005 0.00247 -0.00039)
      PathPoint P5: dummyTibia_r (0.0365112 -0.0708477 0.000392399)
      PathWrap: wrap_object=KnExt_at_fem_r method=hybrid
    Millard2012EquilibriumMuscle vaslat_r: max_isometric_force=5148.767 optimal_fiber_length=0.1030792
        tendon_slack_length=0.2297312 pennation_angle_at_optimal=0.2528673
      PathPoint P1: femur_r (0.00491943 -0.190013 0.0360034)
      PathPoint P2: femur_r (0.0275693 -0.265547 0.0421931)
      PathPoint P3: patella_r (0.0103 0.0423 0.0141)
      PathPoint P4: patella_r (0.005 0.00247 0.00733)
      PathPoint P5: dummyTibia_r (0.0364776 -0.0710495 0.00466316)
      PathWrap: wrap_object=KnExt_at_fem_r method=hybrid
    Millard2012EquilibriumMuscle vasmed_r: max_isometric_force=2747.823 optimal_fiber_length=0.1000416
        tendon_slack_length=0.2086377 pennation_angle_at_optimal=0.4222225
      PathPoint P1: femur_r (0.0143483 -0.215123 0.0193944)
      PathPoint P2: femur_r (0.0364858 -0.28379 0.000928454)
      PathPoint P3: patella_r (0.0063 0.0445 -0.017)
      PathPoint P4: patella_r (0.005 0.00247 -0.0085)
      PathPoint P5: dummyTibia_r (0.0357602 -0.0712625 -0.00618713)
      PathWrap: wrap_object=KnExt_at_fem_r method=hybrid
    Millard2012EquilibriumMuscle addbrev_l: max_isometric_force=625.8197 optimal_fiber_length=0.1038638
        tendon_slack_length=0.04151621 pennation_angle_at_optimal=0.1147809 ignore_tendon_compliance=true
      PathPoint P1: pelvis (-0.0182197 -0.0896676 -0.0159537)
      PathPoint P2: femur_l (-0.00208506 -0.123019 -0.0270558)
      PathWrap: wrap_object=AB_at_femshaft_l method=hybrid
    Millard2012EquilibriumMuscle addlong_l: max_isometric_force=916.8 optimal_fiber_length=0.1075741
        tendon_slack_length=0.1434674 pennation_angle_at_optimal=0.1377704
      PathPoint P1: pelvis (-0.00723064 -0.0848026 -0.0195588)
      PathPoint P2: femur_l (0.0117389 -0.249551 -0.0172005)
      PathWrap: wrap_object=AL_at_femshaft_l method=hybrid
    Millard2012EquilibriumMuscle addmagDist_l: max_isometric_force=597.2951 optimal_fiber_length=0.1743943
        tendon_slack_length=0.1024105 pennation_angle_at_optimal=0.194705 ignore_tendon_compliance=true
      PathPoint P1: pelvis (-0.0706275 -0.121786 -0.0412518)
      PathPoint P2: femur_l (0.0117285 -0.273665 -0.020971)
      PathWrap: wrap_object=AMdist_at_femshaft_l method=hybrid
    Millard2012EquilibriumMuscle addmagIsch_l: max_isometric_force=597.2951 optimal_fiber_length=0.1516965
        tendon_slack_length=0.2379961 pennation_angle_at_optimal=0.1680443
      PathPoint P1: pelvis (-0.0854894 -0.123779 -0.0432097)
      PathPoint P2: femur_l (0.00501458 -0.404471 0.0355637)
      PathWrap: wrap_object=AMisch_at_condyles_l method=hybrid
    Millard2012EquilibriumMuscle addmagMid_l: max_isometric_force=597.2951 optimal_fiber_length=0.1383563
        tendon_slack_length=0.05492575 pennation_angle_at_optimal=0.2073076 ignore_tendon_compliance=true
      PathPoint P1: pelvis (-0.0502329 -0.115185 -0.0295662)
      PathPoint P2: femur_l (0.00252293 -0.169307 -0.0317498)
      PathWrap: wrap_object=AMmid_at_femshaft_l method=hybrid
    Millard2012EquilibriumMuscle addmagProx_l: max_isometric_force=597.2951 optimal_fiber_length=0.1063399
        tendon_slack_length=0.0459578 pennation_angle_at_optimal=0.3114833 ignore_tendon_compliance=true
      PathPoint P1: pelvis (-0.0295521 -0.102593 -0.0141408)
      PathPoint P2: femur_l (-0.0159195 -0.082214 -0.0347922)
      PathWrap: wrap_object=AMprox_at_femshaft_l method=hybrid
    Millard2012EquilibriumMuscle bflh_l: max_isometric_force=1313.184 optimal_fiber_length=0.09871109
        tendon_slack_length=0.3432027 pennation_angle_at_optimal=0.1759182
      PathPoint P1: pelvis (-0.0992067 -0.113611 -0.060707)
      PathPoint P2: dummyTibia_l (-0.038311 -0.0397889 -0.0256206)
      PathPoint P3: dummyTibia_l (-0.0326269 -0.0517255 -0.030684)
    Millard2012EquilibriumMuscle bfsh_l: max_isometric_force=557.1148 optimal_fiber_length=0.1263158
        tendon_slack_length=0.1006341 pennation_angle_at_optimal=0.2642232 ignore_tendon_compliance=true
      PathPoint P1: femur_l (0.00521266 -0.220078 -0.0254259)
      PathPoint P2: dummyTibia_l (-0.0342184 -0.047633 -0.032203)
      PathWrap: wrap_object=BF_at_gastroc_l method=hybrid
    Millard2012EquilibriumMuscle edl_l: max_isometric_force=603.4982 optimal_fiber_length=0.07508353
        tendon_slack_length=0.4033356 pennation_angle_at_optimal=0.2182582
      PathPoint P1: origin_tibia_l (-0.0181892 -0.131531 -0.0207598)
      PathPoint P2: origin_tibia_l (0.0186439 -0.427446 -0.0113419)
      PathPoint P3: calcn_l (0.093541 0.0366428 -0.000814285)
      PathPoint P4: calcn_l (0.164486 0.00559821 -0.0132321)
      PathPoint P5: toes_l (0.000305357 0.00478392 -0.0155732)
      PathPoint P6: toes_l (0.045091 -0.000407142 -0.0254464)
    Millard2012EquilibriumMuscle ehl_l: max_isometric_force=285.8675 optimal_fiber_length=0.08107559
        tendon_slack_length=0.3548489 pennation_angle_at_optimal=0.1972681
      PathPoint P1: origin_tibia_l (-0.0159155 -0.176208 -0.0191395)
      PathPoint P2: origin_tibia_l (0.00807146 -0.330702 -0.0166078)
      PathPoint P3: origin_tibia_l (0.0227365 -0.419829 0.00283549)
      PathPoint P4: calcn_l (0.098732 0.0395946 0.0214768)
      PathPoint P5: calcn_l (0.131609 0.0314518 0.0261589)
      PathPoint P6: calcn_l (0.176496 0.0141482 0.0285)
      PathPoint P7: toes_l (0.0303321 0.00417321 0.0249375)
      PathPoint P8: toes_l (0.0573053 0.00346071 0.0189321)
    Millard2012EquilibriumMuscle fdl_l: max_isometric_force=423.177 optimal_fiber_length=0.04736785
        tendon_slack_length=0.4095156 pennation_angle_at_optimal=0.2248391
      PathPoint P1: origin_tibia_l (-0.0026147 -0.208266 0.00182281)
      PathPoint P2: origin_tibia_l (-0.0200081 -0.414373 0.0125572)
      PathPoint P3: calcn_l (0.0443785 0.0320625 0.0285)
      PathPoint P4: calcn_l (0.0720642 0.0179143 0.0267696)
      PathPoint P5: calcn_l (0.168761 -0.00824463 -0.0118071)
      PathPoint P6: toes_l (-0.00193393 -0.00793928 -0.0149625)
      PathPoint P7: toes_l (0.0290089 -0.00722678 -0.0218839)
      PathPoint P8: toes_l (0.0448875 -0.00610714 -0.0246321)
    Millard2012EquilibriumMuscle fhl_l: max_isometric_force=907.8393 optimal_fiber_length=0.05574241
        tendon_slack_length=0.380507 pennation_angle_at_optimal=0.2580255
      PathPoint P1: origin_tibia_l (-0.0352416 -0.245895 -0.0202535)
      PathPoint P2: origin_tibia_l (-0.0275112 -0.417328 0.00769632)
      PathPoint P3: calcn_l (0.0380678 0.0280928 0.0245303)
      PathPoint P4: calcn_l (0.105653 0.00692142 0.0260571)
      PathPoint P5: calcn_l (0.175682 -0.00539464 0.0273803)
      PathPoint P6: toes_l (0.0157768 -0.00651428 0.0269732)
      PathPoint P7: toes_l (0.0572035 -0.0103821 0.0184232)
    Millard2012EquilibriumMuscle gaslat_l: max_isometric_force=1575.059 optimal_fiber_length=0.05955169
        tendon_slack_length=0.4319322 pennation_angle_at_optimal=0.2102268
      PathPoint P1: femur_l (-0.00312759 -0.397622 -0.0300982)
      PathPoint P2: calcn_l (0.00447857 0.0315535 0.00539464)
      PathWrap: wrap_object=GasLat_at_shank_l method=hybrid
      PathWrap: wrap_object=Gastroc_at_condyles_l method=hybrid
    Millard2012EquilibriumMuscle gasmed_l: max_isometric_force=3115.515 optimal_fiber_length=0.05158179
        tendon_slack_length=0.4558313 pennation_angle_at_optimal=0.1656816
      PathPoint P1: femur_l (0.00834025 -0.394911 0.0226008)
      PathPoint P2: calcn_l (0.00447857 0.0315535 0.00539464)
      PathWrap: wrap_object=GasMed_at_shank_l method=hybrid
      PathWrap: wrap_object=Gastroc_at_condyles_l method=hybrid
    Millard2012EquilibriumMuscle glmax1_l: max_isometric_force=983.7836 optimal_fiber_length=0.1445195
        tendon_slack_length=0.04866849 pennation_angle_at_optimal=0.3540118 ignore_tendon_compliance=true
      PathPoint P1: pelvis (-0.117426 0.0329099 -0.0583243)
      PathPoint P2: pelvis (-0.119907 -0.0230846 -0.080701)
      PathPoint P3: femur_l (-0.0462884 -0.0339865 -0.0328147)
      PathPoint P4: femur_l (-0.0288781 -0.0590073 -0.0510692)
      PathWrap: wrap_object=Gmax1_at_pelvis_l method=hybrid
    Millard2012EquilibriumMuscle glmax2_l: max_isometric_force=1406.046 optimal_fiber_length=0.1547297
        tendon_slack_length=0.07026666 pennation_angle_at_optimal=0.3673821 ignore_tendon_compliance=true
      PathPoint P1: pelvis (-0.12563 0.00829902 -0.0478612)
      PathPoint P2: pelvis (-0.128206 -0.0580931 -0.0842232)
      PathPoint P3: femur_l (-0.0469139 -0.0608838 -0.0273818)
      PathPoint P4: femur_l (-0.0162635 -0.105921 -0.0455276)
      PathWrap: wrap_object=Gmax2_at_pelvis_l method=hybrid
    Millard2012EquilibriumMuscle glmax3_l: max_isometric_force=947.7541 optimal_fiber_length=0.1624902
        tendon_slack_length=0.07873314 pennation_angle_at_optimal=0.3824161 ignore_tendon_compliance=true
      PathPoint P1: pelvis (-0.124008 -0.0500803 -0.0093236)
      PathPoint P2: pelvis (-0.121433 -0.120479 -0.0450641)
      PathPoint P3: femur_l (-0.0292951 -0.117285 -0.0102138)
      PathPoint P4: femur_l (-0.00625519 -0.147935 -0.0446584)
      PathWrap: wrap_object=Gmax3_at_pelvis_l method=hybrid
    Millard2012EquilibriumMuscle glmed1_l: max_isometric_force=1093.467 optimal_fiber_length=0.0777499
        tendon_slack_length=0.04819854 pennation_angle_at_optimal=0.3165559 ignore_tendon_compliance=true
      PathPoint P1: pelvis (-0.042449 0.0233708 -0.121414)
      PathPoint P2: femur_l (-0.0227272 -0.0121976 -0.0603051)
    Millard2012EquilibriumMuscle glmed2_l: max_isometric_force=765.0917 optimal_fiber_length=0.07581964
        tendon_slack_length=0.06050922 pennation_angle_at_optimal=0.3165559 ignore_tendon_compliance=true
      PathPoint P1: pelvis (-0.0810824 0.0301436 -0.069927)
      PathPoint P2: femur_l (-0.0268973 -0.00604668 -0.0572627)
    Millard2012EquilibriumMuscle glmed3_l: max_isometric_force=871.1993 optimal_fiber_length=0.07417713
        tendon_slack_length=0.04445917 pennation_angle_at_optimal=0.3165559 ignore_tendon_compliance=true
      PathPoint P1: pelvis (-0.10989 -0.00696354 -0.0544913)
      PathPoint P2: femur_l (-0.0322142 -0.0048999 -0.0562848)
    Millard2012EquilibriumMuscle glmin1_l: max_isometric_force=374.0459 optimal_fiber_length=0.07121566
        tendon_slack_length=0.01249235 pennation_angle_at_optimal=0.1745329 ignore_tendon_compliance=true
      PathPoint P1: pelvis (-0.0442614 -0.0142133 -0.107947)
      PathPoint P2: femur_l (-0.00750623 -0.0108423 -0.0608484)
    Millard2012EquilibriumMuscle glmin2_l: max_isometric_force=394.8197 optimal_fiber_length=0.05823202
        tendon_slack_length=0.02363434 pennation_angle_at_optimal=0 ignore_tendon_compliance=true
      PathPoint P1: pelvis (-0.0587609 -0.0135455 -0.100591)
      PathPoint P2: femur_l (-0.0100083 -0.0108423 -0.0608484)
    Millard2012EquilibriumMuscle glmin3_l: max_isometric_force=446.7738 optimal_fiber_length=0.03898089
        tendon_slack_length=0.05050553 pennation_angle_at_optimal=0.01745329
      PathPoint P1: pelvis (-0.0752635 -0.0147856 -0.0826693)
      PathPoint P2: femur_l (-0.0140742 -0.00865301 -0.0597618)
    Millard2012EquilibriumMuscle grac_l: max_isometric_force=281.3115 optimal_fiber_length=0.2432864
        tendon_slack_length=0.1794062 pennation_angle_at_optimal=0.1720016 ignore_tendon_compliance=true
      PathPoint P1: pelvis (-0.0451772 -0.12336 -0.0254431)
      PathPoint P2: dummyTibia_l (-0.0209403 -0.054056 0.0299853)
      PathPoint P3: dummyTibia_l (0.00202355 -0.0791457 0.0159294)
      PathWrap: wrap_object=GR_at_condyles_l method=hybrid
    Millard2012EquilibriumMuscle iliacus_l: max_isometric_force=1021.141 optimal_fiber_length=0.1060072
        tendon_slack_length=0.09402809 pennation_angle_at_optimal=0.279914 ignore_tendon_compliance=true
      PathPoint P1: pelvis (-0.0577116 0.0294758 -0.0873311)
      PathPoint P2: pelvis (-0.0128778 -0.0531328 -0.0783183)
      PathPoint P3: femur_l (-0.00239782 -0.058903 -0.0151034)
      PathPoint P4: femur_l (-0.0127189 -0.0664093 -0.0212969)
      PathWrap: wrap_object=IL_at_brim_l method=hybrid range=(2 3)
    Millard2012EquilibriumMuscle perbrev_l: max_isometric_force=521.2016 optimal_fiber_length=0.01000108
        tendon_slack_length=0.2590772 pennation_angle_at_optimal=0.2052361
      PathPoint P1: origin_tibia_l (-0.0276248 -0.327227 -0.0254181)
      PathPoint P2: origin_tibia_l (-0.0385384 -0.503118 -0.0252156)
      PathPoint P3: origin_tibia_l (-0.0323995 -0.517463 -0.0258232)
      PathPoint P4: calcn_l (0.047941 0.0279729 -0.023716)
      PathPoint P5: calcn_l (0.0689089 0.0226891 -0.0349125)
    Millard2012EquilibriumMuscle perlong_l: max_isometric_force=1115.371 optimal_fiber_length=0.06532258
        tendon_slack_length=0.4290992 pennation_angle_at_optimal=0.2479525
      PathPoint P1: origin_tibia_l (-0.0227365 -0.177442 -0.0285574)
      PathPoint P2: origin_tibia_l (-0.0360373 -0.504023 -0.0240004)
      PathPoint P3: origin_tibia_l (-0.0309216 -0.518755 -0.0243042)
      PathPoint P4: calcn_l (0.0445821 0.0238288 -0.0224946)
      PathPoint P5: calcn_l (0.069316 0.010982 -0.0289071)
      PathPoint P6: calcn_l (0.0867213 0.00714864 -0.0120107)
      PathPoint P7: calcn_l (0.122448 0.0088063 0.0187286)
    Millard2012EquilibriumMuscle piri_l: max_isometric_force=1029.787 optimal_fiber_length=0.02629179
        tendon_slack_length=0.1165083 pennation_angle_at_optimal=0.1745329
      PathPoint P1: pelvis (-0.0971176 -0.00622903 -0.0139958)
      PathPoint P2: pelvis (-0.0973179 -0.0292469 -0.0631104)
      PathPoint P3: femur_l (-0.0154295 -0.00375311 -0.0474835)
    Millard2012EquilibriumMuscle psoas_l: max_isometric_force=1426.79 optimal_fiber_length=0.1170476
        tendon_slack_length=0.09529197 pennation_angle_at_optimal=0.2155251 ignore_tendon_compliance=true
      PathPoint P1: pelvis (-0.057807 0.0591424 -0.0404023)
      PathPoint P2: pelvis (-0.0195552 -0.0623857 -0.0679587)
      PathPoint P3: femur_l (-0.0137614 -0.0486862 -0.00499826)
      PathPoint P4: femur_l (-0.0244995 -0.0546287 -0.00956189)
      PathWrap: wrap_object=PS_at_brim_l method=hybrid range=(2 3)
    Millard2012EquilibriumMuscle recfem_l: max_isometric_force=2191.741 optimal_fiber_length=0.07446114
        tendon_slack_length=0.4747184 pennation_angle_at_optimal=0.2170149
      PathPoint P1: pelvis (-0.0228938 -0.0370117 -0.0966547)
      PathPoint P2: patella_l (0.01 0.049 -0.0007)
      PathPoint P3: patella_l (0.0121 0.0437 0.001)
      PathPoint P4: patella_l (0.005 0.00247 -3e-5)
      PathPoint P5: dummyTibia_l (0.0370605 -0.0717564 0.000475957)
      PathWrap: wrap_object=KnExt_at_fem_l method=hybrid
    Millard2012EquilibriumMuscle sart_l: max_isometric_force=249.4131 optimal_fiber_length=0.4063485
        tendon_slack_length=0.1472001 pennation_angle_at_optimal=0.02613542 ignore_tendon_compliance=true
      PathPoint P1: pelvis (-0.0186012 -0.014881 -0.109397)
      PathPoint P2: femur_l (-0.00312759 -0.371975 0.045745)
      PathPoint P3: dummyTibia_l (-0.0285343 -0.0455867 0.0369626)
      PathPoint P4: dummyTibia_l (-0.0180755 -0.0680958 0.0267346)
      PathPoint P5: dummyTibia_l (0.0154608 -0.0920828 0.00263295)
    Millard2012EquilibriumMuscle semimem_l: max_isometric_force=2200.987 optimal_fiber_length=0.07146983
        tendon_slack_length=0.3641009 pennation_angle_at_optimal=0.2545615
      PathPoint P1: pelvis (-0.0941509 -0.108746 -0.0636077)
      PathPoint P2: dummyTibia_l (-0.0329679 -0.0474056 0.0198484)
      PathWrap: wrap_object=SM_at_condyles_l method=hybrid
    Millard2012EquilibriumMuscle semiten_l: max_isometric_force=591.2951 optimal_fiber_length=0.2012724
        tendon_slack_length=0.2633752 pennation_angle_at_optimal=0.241295
      PathPoint P1: pelvis (-0.0990159 -0.119525 -0.0533517)
      PathPoint P2: dummyTibia_l (-0.0354689 -0.0577507 0.0231902)
      PathPoint P3: dummyTibia_l (0.00215997 -0.0878766 0.0118483)
      PathWrap: wrap_object=ST_at_condyles_l method=hybrid
    Millard2012EquilibriumMuscle soleus_l: max_isometric_force=6194.843 optimal_fiber_length=0.04422552
        tendon_slack_length=0.3181608 pennation_angle_at_optimal=0.3814289
      PathPoint P1: origin_tibia_l (-0.00863987 -0.104133 -0.0099242)
      PathPoint P2: calcn_l (0.00447857 0.0315535 0.00539464)
    Millard2012EquilibriumMuscle tfl_l: max_isometric_force=411.2066 optimal_fiber_length=0.09759616
        tendon_slack_length=0.4662657 pennation_angle_at_optimal=0.05235988
      PathPoint P1: pelvis (-0.0296666 0.0204137 -0.128562)
      PathPoint P2: femur_l (0.0306504 -0.103732 -0.0648687)
      PathPoint P3: femur_l (0.0111551 -0.422225 -0.0352051)
      PathPoint P4: dummyTibia_l (0.0122777 -0.0466098 -0.0350385)
    Millard2012EquilibriumMuscle tibant_l: max_isometric_force=1227.452 optimal_fiber_length=0.07032729
        tendon_slack_length=0.2553313 pennation_angle_at_optimal=0.1951828
      PathPoint P1: origin_tibia_l (0.0175071 -0.169558 -0.0164053)
      PathPoint P2: origin_tibia_l (0.0285343 -0.246325 -0.0129622)
      PathPoint P3: origin_tibia_l (0.026488 -0.423393 0.0133673)
      PathPoint P4: calcn_l (0.118682 0.0181178 0.0310446)
    Millard2012EquilibriumMuscle tibpost_l: max_isometric_force=1730.154 optimal_fiber_length=0.03982516
        tendon_slack_length=0.3163231 pennation_angle_at_optimal=0.2264891
      PathPoint P1: origin_tibia_l (-0.00466098 -0.148242 -0.0104305)
      PathPoint P2: origin_tibia_l (-0.0186439 -0.415509 0.0177218)
      PathPoint P3: calcn_l (0.0424446 0.0339964 0.0291107)
      PathPoint P4: calcn_l (0.0785785 0.0161839 0.0286018)
    Millard2012EquilibriumMuscle vasint_l: max_isometric_force=1697.361 optimal_fiber_length=0.1026637
        tendon_slack_length=0.2161487 pennation_angle_at_optimal=0.06309973
      PathPoint P1: femur_l (0.0302334 -0.200583 -0.0336839)
      PathPoint P2: femur_l (0.0349248 -0.217264 -0.0309675)
      PathPoint P3: patella_l (0.0058 0.048 0.0006)
      PathPoint P4: patella_l (0.005 0.00247 0.00039)
      PathPoint P5: dummyTibia_l (0.0370264 -0.0718473 -0.00043545)
      PathWrap: wrap_object=KnExt_at_fem_l method=hybrid
    Millard2012EquilibriumMuscle vaslat_l: max_isometric_force=5148.767 optimal_fiber_length=0.1030755
        tendon_slack_length=0.2351486 pennation_angle_at_optimal=0.2528673
      PathPoint P1: femur_l (0.00500415 -0.193285 -0.0379216)
      PathPoint P2: femur_l (0.0280441 -0.27012 -0.0444411)
      PathPoint P3: patella_l (0.0103 0.0423 -0.0141)
      PathPoint P4: patella_l (0.005 0.00247 -0.00733)
      PathPoint P5: dummyTibia_l (0.0369923 -0.072052 -0.00517476)
      PathWrap: wrap_object=KnExt_at_fem_l method=hybrid
    Millard2012EquilibriumMuscle vasmed_l: max_isometric_force=2747.823 optimal_fiber_length=0.1005917
        tendon_slack_length=0.2130122 pennation_angle_at_optimal=0.4222225
      PathPoint P1: femur_l (0.0145954 -0.218827 -0.0204277)
      PathPoint P2: femur_l (0.0371141 -0.288677 -0.000977921)
      PathPoint P3: patella_l (0.0063 0.0445 0.017)
      PathPoint P4: patella_l (0.005 0.00247 0.0085)
      PathPoint P5: dummyTibia_l (0.0362647 -0.072268 0.00686593)
      PathWrap: wrap_object=KnExt_at_fem_l method=hybrid
    CoordinateActuator lumbar_ext: coordinate=lumbar_extension optimal_force=10
    CoordinateActuator lumbar_bend: coordinate=lumbar_bending optimal_force=10
    CoordinateActuator lumbar_rot: coordinate=lumbar_rotation optimal_force=10
    CoordinateActuator shoulder_flex_r: coordinate=arm_flex_r optimal_force=10
    CoordinateActuator shoulder_add_r: coordinate=arm_add_r optimal_force=10
    CoordinateActuator shoulder_rot_r: coordinate=arm_rot_r optimal_force=10
    CoordinateActuator elbow_flex_r: coordinate=elbow_flex_r optimal_force=10
    CoordinateActuator pro_sup_r: coordinate=pro_sup_r optimal_force=10
    CoordinateActuator wrist_flex_r: coordinate=wrist_flex_r optimal_force=10
    CoordinateActuator wrist_dev_r: coordinate=wrist_dev_r optimal_force=10
    CoordinateActuator shoulder_flex_l: coordinate=arm_flex_l optimal_force=10
    CoordinateActuator shoulder_add_l: coordinate=arm_add_l optimal_force=10
    CoordinateActuator shoulder_rot_l: coordinate=arm_rot_l optimal_force=10
    CoordinateActuator elbow_flex_l: coordinate=elbow_flex_l optimal_force=10
    CoordinateActuator pro_sup_l: coordinate=pro_sup_l optimal_force=10
    CoordinateActuator wrist_flex_l: coordinate=wrist_flex_l optimal_force=10
    CoordinateActuator wrist_dev_l: coordinate=wrist_dev_l optimal_force=10
    ObjectGroup right_leg: members=(addbrev_r addlong_r addmagDist_r addmagIsch_r addmagMid_r addmagProx_r bflh_r bfsh_r edl_r ehl_r fdl_r fhl_r gaslat_r gasmed_r glmax1_r glmax2_r glmax3_r glmed1_r glmed2_r glmed3_r glmin1_r glmin2_r glmin3_r grac_r iliacus_r perbrev_r perlong_r piri_r psoas_r recfem_r sart_r semimem_r semiten_r soleus_r tfl_r tibant_r tibpost_r vasint_r vaslat_r vasmed_r)
    ObjectGroup left_leg: members=(addbrev_l addlong_l addmagDist_l addmagIsch_l addmagMid_l addmagProx_l bflh_l bfsh_l edl_l ehl_l fdl_l fhl_l gaslat_l gasmed_l glmax1_l glmax2_l glmax3_l glmed1_l glmed2_l glmed3_l glmin1_l glmin2_l glmin3_l grac_l iliacus_l perbrev_l perlong_l psoas_l recfem_l sart_l semimem_l semiten_l soleus_l tfl_l tibant_l tibpost_l vasint_l vaslat_l vasmed_l)
    ObjectGroup hip_add_r: members=(addbrev_r addlong_r addmagDist_r addmagIsch_r addmagMid_r addmagProx_r bflh_r grac_r semimem_r semiten_r)
    ObjectGroup hip_abd_r: members=(glmax1_r glmed1_r glmed2_r glmed3_r glmin1_r glmin2_r glmin3_r piri_r sart_r tfl_r)
    ObjectGroup hip_flex_r: members=(addbrev_r addlong_r glmin1_r grac_r iliacus_r psoas_r recfem_r sart_r tfl_r)
    ObjectGroup hip_ext_r: members=(addlong_r addmagDist_r addmagIsch_r addmagMid_r addmagProx_r bflh_r glmax1_r glmax2_r glmax3_r glmed1_r glmed2_r glmed3_r glmin3_r semimem_r semiten_r)
    ObjectGroup hip_inrot_r: members=(glmed1_r glmed2_r glmed3_r glmin1_r iliacus_r psoas_r tfl_r)
    ObjectGroup hip_exrot_r: members=(glmin3_r piri_r)
    ObjectGroup knee_flex_r: members=(bflh_r bfsh_r gaslat_r gasmed_r grac_r sart_r semimem_r semiten_r)
    ObjectGroup knee_ext_r: members=(recfem_r vasint_r vaslat_r vasmed_r)
    ObjectGroup ankle_df_r: members=(edl_r ehl_r tibant_r)
    ObjectGroup ankle_pf_r: members=(fdl_r fhl_r gaslat_r gasmed_r perbrev_r perlong_r soleus_r tibpost_r)
    ObjectGroup everter_r: members=(edl_r perbrev_r perlong_r)
    ObjectGroup inverter_r: members=(ehl_r fdl_r fhl_r tibant_r tibpost_r)
    ObjectGroup hip_add_l: members=(addbrev_l addlong_l addmagDist_l addmagIsch_l addmagMid_l addmagProx_l bflh_l grac_l semimem_l semiten_l)
    ObjectGroup hip_abd_l: members=(glmax1_l glmed1_l glmed2_l glmed3_l glmin1_l glmin2_l glmin3_l sart_l tfl_l)
    ObjectGroup hip_flex_l: members=(addbrev_l addlong_l glmin1_l grac_l iliacus_l psoas_l recfem_l sart_l tfl_l)
    ObjectGroup hip_ext_l: members=(addlong_l addmagDist_l addmagIsch_l addmagMid_l addmagProx_l bflh_l glmax1_l glmax2_l glmax3_l glmed1_l glmed2_l glmed3_l glmin3_l semimem_l semiten_l)
    ObjectGroup hip_exrot_l: members=glmin3_l
    ObjectGroup hip_inrot_l: members=(glmed1_l glmed2_l glmed3_l glmin1_l iliacus_l psoas_l tfl_l)
    ObjectGroup knee_flex_l: members=(bflh_l bfsh_l gaslat_l gasmed_l grac_l sart_l semimem_l semiten_l)
    ObjectGroup knee_ext_l: members=(recfem_l vasint_l vaslat_l vasmed_l)
    ObjectGroup ankle_df_l: members=(edl_l ehl_l tibant_l)
    ObjectGroup ankle_pf_l: members=(fdl_l fhl_l gaslat_l gasmed_l perbrev_l perlong_l soleus_l tibpost_l)
    ObjectGroup everter_l: members=(edl_l perbrev_l perlong_l)
    ObjectGroup inverter_l: members=(ehl_l fdl_l fhl_l tibant_l tibpost_l)
  MarkerSet:
    Marker LFHD: torso (0.0525807 0.555498 -0.071251) fixed=true
    Marker RFHD: torso (0.0524631 0.554252 0.0718385) fixed=true
    Marker LBHD: torso (-0.0515733 0.531433 -0.071507) fixed=true
    Marker RBHD: torso (-0.0517382 0.533659 0.0707717) fixed=true
    Marker THO1: torso (-0.0802567 0.446296 0.0490797)
    Marker THO2: torso (-0.0769668 0.452242 -0.0235049)
    Marker THO3: torso (-0.0975841 0.421596 0.00959098)
    Marker CLAV: torso (0.0311408 0.364924 0.00329349) fixed=true
    Marker T8: torso (-0.0914851 0.233066 0.0031555) fixed=true
    Marker LACR1: torso (0.0400198 0.438627 -0.146876)
    Marker LACR2: torso (0.0139963 0.478727 -0.158742)
    Marker LSJC: torso (0.00228361 0.38685 -0.17484) fixed=true
    Marker LPUA1: humerus_l (-0.046035 -0.0779745 -0.0468282)
    Marker LPUA2: humerus_l (-0.032605 -0.167119 -0.0450697)
    Marker LPUA3: humerus_l (0.0137475 -0.116772 -0.0884001)
    Marker LLEP: humerus_l (0 -0.293006 -0.0391692) fixed=true
    Marker LMEP: humerus_l (0.00961824 -0.278746 0.0325794)
    Marker LEJC: humerus_l (0.000658035 -0.290443 0.00523003) fixed=true
    Marker LFA1: radius_l (-0.0398048 -0.173328 0.0049789)
    Marker LFA2: radius_l (0.0176943 -0.168965 -0.0340281)
    Marker LFA3: radius_l (-0.0254404 -0.139041 -0.0348675)
    Marker LWRR: radius_l (-0.0185728 -0.253266 -0.0517085) fixed=true
    Marker LWRU: ulna_l (-0.0429073 -0.265668 -0.0289661) fixed=true
    Marker LWJC: ulna_l (-0.00871828 -0.264596 -0.0272834) fixed=true
    Marker LHNDR: hand_l (-0.0300491 -0.0523077 -0.0173617) fixed=true
    Marker LHNDU: hand_l (-0.0267103 -0.0523077 0.032275) fixed=true
    Marker LCAR: hand_l (-0.0233715 -0.0845827 0.00845827) fixed=true
    Marker RACR1: torso (-0.0525605 0.417549 0.186911)
    Marker RACR2: torso (0.00400391 0.412763 0.173507)
    Marker RSJC: torso (-0.000745151 0.394627 0.169385) fixed=true
    Marker RPUA1: humerus_r (-0.0403931 -0.104787 0.0658748)
    Marker RPUA2: humerus_r (-0.0177324 -0.189746 0.0563213)
    Marker RPUA3: humerus_r (0.0333336 -0.12763 0.0615326)
    Marker RLEP: humerus_r (0 -0.294934 0.039427) fixed=true
    Marker RMEP: humerus_r (0.0150942 -0.280352 -0.0339888)
    Marker REJC: humerus_r (-0.00149902 -0.291601 -0.00346561) fixed=true
    Marker RFA1: radius_r (-0.0448176 -0.163814 0.00481543)
    Marker RFA2: radius_r (0.0225451 -0.176298 0.0218537)
    Marker RFA3: radius_r (-0.0135535 -0.134258 0.0352244)
    Marker RWRR: radius_r (-0.0190354 -0.257821 0.0489801) fixed=true
    Marker RWRU: ulna_r (-0.0444256 -0.267393 0.017344) fixed=true
    Marker RWJC: ulna_r (-0.0104295 -0.270707 0.024308) fixed=true
    Marker RHNDR: hand_r (-0.0285129 -0.0496335 0.0164741) fixed=true
    Marker RHNDU: hand_r (-0.0253448 -0.0496335 -0.0306249) fixed=true
    Marker RCAR: hand_r (-0.0221767 -0.0802584 -0.00802584) fixed=true
    Marker LASI: pelvis (0.0193373 0.0127578 -0.128571) fixed=true
    Marker RASI: pelvis (0.00855526 0.0112254 0.1264) fixed=true
    Marker LPSI: pelvis (-0.141759 0.0320114 -0.0625829) fixed=true
    Marker RPSI: pelvis (-0.140181 0.0314438 0.0403454) fixed=true
    Marker LHJC: femur_l (0 0 0) fixed=true
    Marker RHJC: femur_r (0 0 0) fixed=true
    Marker LTH1: femur_l (0.114841 -0.129281 -0.0655632)
    Marker LTH2: femur_l (0.0992335 -0.304662 -0.0483005)
    Marker LTH3: femur_l (0.0590277 -0.2164 -0.089154)
    Marker LKJC: origin_tibia_l (0.00447443 -0.00176253 0) fixed=true
    Marker LMFC: femur_l (0.00396162 -0.425353 0.048896) fixed=true
    Marker LLFC: femur_l (0.00417013 -0.425353 -0.048896) fixed=true
    Marker LTB1: origin_tibia_l (0.0366316 -0.10246 0.0258163)
    Marker LTB2: origin_tibia_l (0.0284263 -0.231563 0.0126341)
    Marker LTB3: origin_tibia_l (0.0465422 -0.163844 -0.0416804)
    Marker LAJC: talus_l (0 0.0203571 0) fixed=true
    Marker LMMAL: origin_tibia_l (-0.00341047 -0.431993 0.0384816) fixed=true
    Marker LLMAL: origin_tibia_l (-0.0190987 -0.439951 -0.0462792) fixed=true
    Marker LMT1: calcn_l (0.198048 0.0270059 0.0274916)
    Marker LMT23: calcn_l (0.193393 0.0315535 -0.0101786) fixed=true
    Marker LMT5: calcn_l (0.169765 0.0187941 -0.0757041)
    Marker RTH1: femur_r (0.0817462 -0.119221 0.0824234)
    Marker RTH2: femur_r (0.0847464 -0.291764 0.0545108)
    Marker RTH3: femur_r (0.0331847 -0.212495 0.0931844)
    Marker RKJC: origin_tibia_r (0.00441218 -0.00173801 0) fixed=true
    Marker RMFC: femur_r (-0.00389455 -0.418152 -0.0464227) fixed=true
    Marker RLFC: femur_r (0.00409953 -0.418152 0.0464227) fixed=true
    Marker RTB1: origin_tibia_r (0.0362423 -0.0872366 -0.0221686)
    Marker RTB2: origin_tibia_r (0.0246513 -0.215072 -0.0160706)
    Marker RTB3: origin_tibia_r (0.0404103 -0.148021 0.0373664)
    Marker RAJC: talus_r (0 0.0204536 0) fixed=true
    Marker RMMAL: origin_tibia_r (-0.00336302 -0.425983 -0.0346771) fixed=true
    Marker RLMAL: origin_tibia_r (-0.0188329 -0.43383 0.0417038) fixed=true
    Marker RCAL: calcn_r (-0.0269027 0.014672 -0.01065)
    Marker RMT1: calcn_r (0.208089 0.0104654 -0.0405592)
    Marker RMT23: calcn_r (0.194309 0.0317031 0.0102268) fixed=true
    Marker RMT5: calcn_r (0.175592 0.00343679 0.0727653)
    Marker LCAL: calcn_l (-0.0247095 0.0177867 0.0173388)
